# OpenSim document version 40600
Model:
  Ground
  BodySet:
    Body pelvis: mass=11.777 [kg] inertia=(0.11777 0.11777 0.11777 0 0 0)
      PhysicalOffsetFrame pelvis_geom_1_offset: socket_parent=.. translation=(0 0 0) [meters]
          meshes=(C:\Program Files\opensimcreator\resources\OpenSimCreator\geometry\r_pelvis.vtp)
      PhysicalOffsetFrame pelvis_geom_2_offset: socket_parent=.. translation=(0 0 0)
          meshes=(C:\Program Files\opensimcreator\resources\OpenSimCreator\geometry\l_pelvis.vtp)
      PhysicalOffsetFrame pelvis_geom_3_offset: socket_parent=.. translation=(0 0 0)
          meshes=(C:\Program Files\opensimcreator\resources\OpenSimCreator\geometry\sacrum.vtp)
      Station RASI: .. (0.00953047 0.01808161 0.128464)
      Station LASI: .. (0.00953047 0.01808161 -0.128464)
      Station RPSI: .. (-0.155 0.03500003 0.045)
      Station LPSI: .. (-0.155 0.03500003 -0.045)
      Station rect_fem_R_O: .. (-0.02886196 -0.03015667 0.09918958)
      Station rect_fem_L_O: .. (-0.028862 -0.03015697 -0.09919)
      Station bf_long_R_O: .. (-0.125149 -0.1048394 0.05793559)
      Station bf_long_L_O: .. (-0.125149 -0.104839 -0.057936)
      Station semimemb_R_O: .. (-0.1275382 -0.08856475 0.0680287)
      Station semimemb_L_O: .. (-0.127538 -0.08856499 -0.068029)
      Station semitend_R_O: .. (-0.1343624 -0.08815169 0.06383903)
      Station semitend_L_O: .. (-0.134362 -0.08815199 -0.063839)
      Station add_magnus_R_O: .. (-0.1049716 -0.1150737 0.04038837)
      Station add_magnus_L_O: .. (-0.104972 -0.115074 -0.040388)
      Station glut_max_R_O1: .. (-0.1233018 0.07099408 0.06186732)
      Station glut_max_R_O2: .. (-0.1305333 0.0611164 0.06008377)
      Station glut_max_R_O3: .. (-0.1376102 0.05182248 0.05689009)
      Station glut_max_R_O4: .. (-0.1441247 0.03810453 0.05364086)
      Station glut_max_R_O5: .. (-0.1522336 0.0207184 0.04687474)
      Station glut_max_R_O6: .. (-0.1629553 0.004777551 0.03796745)
      Station glut_max_R_O7: .. (-0.1697764 -0.01080602 0.02862071)
      Station glut_max_L_O1: .. (-0.123302 0.07099396 -0.061867)
      Station glut_max_L_O2: .. (-0.130533 0.06111604 -0.060084)
      Station glut_max_L_O3: .. (-0.13761 0.05182201 -0.05689)
      Station glut_max_L_O4: .. (-0.144125 0.03810501 -0.053641)
      Station glut_max_L_O5: .. (-0.152234 0.02071798 -0.046875)
      Station glut_max_L_O6: .. (-0.162955 0.004778028 -0.037967)
      Station glut_max_L_O7: .. (-0.169776 -0.01080602 -0.028621)
      Station glut_med_R_O5: .. (-0.1164174 0.06047541 0.06996071)
      Station glut_med_R_O4: .. (-0.1012582 0.07113403 0.07161421)
      Station glut_med_R_O3: .. (-0.0894222 0.07869667 0.08265114)
      Station glut_med_R_O2: .. (-0.07548246 0.07958382 0.09380755)
      Station glut_med_R_O1: .. (-0.06235185 0.07562584 0.1067206)
      Station glut_med_L_O1: .. (-0.062352 0.07562596 -0.106721)
      Station glut_med_L_O2: .. (-0.075482 0.07958394 -0.093808)
      Station glut_med_L_O3: .. (-0.089422 0.07869703 -0.082651)
      Station glut_med_L_O4: .. (-0.101258 0.07113403 -0.071614)
      Station glut_med_L_O5: .. (-0.116417 0.06047505 -0.069961)
      Station psoas_L_midpoint: .. (-0.03656036 -0.05649406 -0.06072673)
      Station psoas_R_midpoint: .. (-0.03656 -0.056494 0.060727)
      Station iliacus_R_midpoint: .. (-0.03698 -0.05152398 0.069295)
      Station iliacus_L_midpoint: .. (-0.03698049 -0.05152446 -0.0692948)
      Station iliacus_L_O1: .. (-0.08576921 0.0504815 -0.06305785)
      Station iliacus_L_O2: .. (-0.07572198 0.05819035 -0.07528363)
      Station iliacus_L_O3: .. (-0.06497246 0.05711508 -0.08896969)
      Station iliacus_L_O4: .. (-0.05116031 0.05233759 -0.1013019)
      Station iliacus_R_O1: .. (-0.085769 0.05048102 0.063058)
      Station iliacus_R_O2: .. (-0.075722 0.05818999 0.075284)
      Station iliacus_R_O3: .. (-0.064972 0.05711502 0.08897)
      Station iliacus_R_O4: .. (-0.05116 0.052338 0.101302)
      WrapSphere wrap_glutmax_R: translation=(-0.1086181 -0.03163278 0.05921531) quadrant=all radius=0.06
      WrapSphere wrap_glutmax_L: translation=(-0.108618 -0.031633 -0.059215) quadrant=all radius=0.06
      WrapSphere wrap_glutmed_R: translation=(-0.07593358 0 0.08226095) quadrant=all
      WrapSphere wrap_glutmed_L: translation=(-0.075934 0 -0.082261) quadrant=all
    Body femur_r: mass=9.3014 inertia=(0.093014 0.093014 0.093014 0 0 0)
      PhysicalOffsetFrame femur_r_geom_1_offset: socket_parent=.. translation=(0 0 0)
          meshes=(C:\Program Files\opensimcreator\resources\OpenSimCreator\geometry\r_femur.vtp)
      Station RHJC: .. (0 0 0)
      Station RTH1: .. (0.018 -0.15 0.064)
      Station RTH2: .. (0.08 -0.23 0.004699998)
      Station RTH3: .. (0.01 -0.3 0.06)
      Station RLFC: .. (0 -0.404 0.05)
      Station RMFC: .. (0 -0.404 -0.05)
      Station gastro_lateral_R_O: .. (-0.008639924 -0.3904748 0.02283328)
      Station gastro_medial_R_O: .. (-0.007398985 -0.391463 -0.02771763)
      Station gastro_medial_R_O_2: .. (-0.02693287 -0.407887 -0.0252707)
      Station gastro_lateral_R_O_2: .. (-0.02561404 -0.4073194 0.01524452)
      Station vastus_int_R_O: .. (-0.001525514 -0.04166722 0.04183711)
      Station vastus_lat_R_O: .. (-0.003884815 -0.03019953 0.0567302)
      Station vastus_med_R_O: .. (0.002067305 -0.05528188 0.02685072)
      Station bf_long_R_midpoint2: .. (7.997453e-5 -0.3857616 0.03363166)
      Station bf_long_R_midpoint: .. (-0.000107117 -0.298996 0.02007476)
      Station bf_short_R_midpoint: .. (0.00220032 -0.3515679 0.01520379)
      Station bf_short_R_O: .. (0.007287301 -0.2827815 0.021523)
      Station semimemb_R_midpoint: .. (-0.01175412 -0.3686156 -0.003484368)
      Station semitend_R_midpoint2: .. (-0.002485298 -0.4163785 -0.04426853)
      Station semitend_R_midpoint: .. (-0.01105449 -0.370198 -0.007421643)
      Station add_magnus_R_I: .. (0.01083487 -0.3716686 -0.01986081)
      Station glut_max_R_I: .. (-0.01832565 -0.06399083 0.05367643)
      Station glut_med_R_I: .. (-0.02096903 -0.01837617 0.05783226)
      Station psoas_R_I: .. (-0.025619 -0.04966301 0.014078)
      Station iliacus_R_I: .. (-0.026565 -0.05514097 0.010027)
      WrapEllipsoid wrap_quad_R: translation=(0.02338624 -0.1992002 0.02137009) quadrant=all dimensions=(0.03 0.2 0.03)
      WrapSphere wrap_hip_flex_R: translation=(0 0 0) quadrant=all radius=0.025
    Body tibia_r: mass=3.7075 inertia=(0.037075 0.037075 0.037075 0 0 0)
      PhysicalOffsetFrame tibia_r_geom_1_offset: socket_parent=.. translation=(0 0 0)
          meshes=(C:\Program Files\opensimcreator\resources\OpenSimCreator\geometry\r_tibia.vtp)
      PhysicalOffsetFrame tibia_r_geom_2_offset: socket_parent=.. translation=(0 0 0)
          meshes=(C:\Program Files\opensimcreator\resources\OpenSimCreator\geometry\r_fibula.vtp)
      Station RKJC: .. (0.001731001 -0.002389014 -0.008451998)
      Station RTB1: .. (-0.001661781 -0.156488 0.0492394)
      Station RTB2: .. (0.0369643 -0.230107 -0.003916986)
      Station RTB3: .. (0.0113793 -0.295236 0.0553541)
      Station RLMAL: .. (-0.004999999 -0.3888 0.053)
      Station RMMAL: .. (0.006000001 -0.3888 -0.038)
      Station R_tibial_plateau: .. (-0.008089539 -0.01700002 -0.001484737)
      Station gastro_R_midpoint: .. (-0.03757608 -0.2204375 0.004863776)
      Station soleus_R_O: .. (-0.007569384 -0.07631665 0.00765691)
      Station ant_tibialis_R_O: .. (0.01160397 -0.03921127 0.0338693)
      Station ant_tibialis_R_midpoint: .. (0.0188535 -0.09953991 0.01535495)
      Station ant_tibialis_R_midpoint2: .. (0.01133889 -0.3451298 0.001191065)
      Station quad_R_I: .. (0.02412146 -0.0535388 0.005920261)
      Station bf_long_R_I: .. (-0.01368197 -0.06808397 0.03956024)
      Station bf_short_R_I: .. (-0.002270129 -0.06780246 0.04008793)
      Station semimemb_R_I: .. (-0.01314361 -0.03481874 -0.02845234)
      Station semitend_R_I: .. (-0.00389586 -0.0611842 -0.01439274)
    Body talus_r: mass=0.1 inertia=(0.001 0.001 0.001 0 0 0)
      PhysicalOffsetFrame talus_r_geom_1_offset: socket_parent=.. translation=(0 0 0)
          meshes=(C:\Program Files\opensimcreator\resources\OpenSimCreator\geometry\r_talus.vtp)
      Station RAJC: .. (0 0 0)
    Body calcn_r: mass=1.25 inertia=(0.0125 0.0125 0.0125 0 0 0)
      PhysicalOffsetFrame calcn_r_geom_1_offset: socket_parent=.. translation=(0 0 0)
          orientation=(0 0 -5.852095e-98) [radians]
          meshes=(C:\Program Files\opensimcreator\resources\OpenSimCreator\geometry\r_foot.vtp)
      Station RCAL: .. (-0.02500001 0.02 -0.005000003)
      Station RTOE: .. (0.205 0.0297308 -0.03)
      Station RMT5: .. (0.145 0.02491 0.059)
      Station gastro_soleus_R_I: .. (-0.005856559 0.01381358 -0.006380938)
      Station ant_tibialis_R_I: .. (0.1251947 0.019634 -0.03447968)
      Station ant_tibialis_R_midpoint3: .. (0.09086943 0.02964569 -0.03585902)
    Body toes_r: mass=0.2166 inertia=(0.002166 0.002166 0.002166 0 0 0)
      PhysicalOffsetFrame toes_r_geom_1_offset: socket_parent=.. translation=(0 0 0) orientation=(0 0 -5.852095e-98)
          meshes=(C:\Program Files\opensimcreator\resources\OpenSimCreator\geometry\r_bofoot.vtp)
    Body patella_r: mass=0.0862 inertia=(0.000862 0.000862 0.000862 0 0 0)
      PhysicalOffsetFrame patella_r_geom_1_offset: socket_parent=.. translation=(0 0 0)
          meshes=(C:\Program Files\opensimcreator\resources\OpenSimCreator\geometry\r_patella.vtp)
      Station vastus_lat_R_patella: .. (0.005873818 0.02946802 0.01300081)
      Station rect_fem_R_patella: .. (0.01013569 0.02957204 0.002904445)
      Station vastus_med_R_patella: .. (0.00408945 0.02935346 -0.007129028)
      Station vastus_int_R_patella: .. (0.0003161482 0.02891745 0.002896123)
    Body femur_l: mass=9.3014 inertia=(0.093014 0.093014 0.093014 0 0 0)
      PhysicalOffsetFrame femur_l_geom_1_offset: socket_parent=.. translation=(0 0 0)
          meshes=(C:\Program Files\opensimcreator\resources\OpenSimCreator\geometry\l_femur.vtp)
      Station LHJC: .. (0 0 0)
      Station LTH1: .. (0.018 -0.15 -0.064)
      Station LTH2: .. (0.08 -0.23 -0.004699998)
      Station LTH3: .. (0.01 -0.3 -0.06)
      Station LLFC: .. (0 -0.404 -0.05)
      Station LMFC: .. (0 -0.404 0.05)
      Station gastro_lateral_L_O: .. (-0.008639999 -0.390475 -0.022833)
      Station gastro_medial_L_O: .. (-0.007399 -0.391463 0.027718)
      Station gastro_medial_L_O_2: .. (-0.026933 -0.407887 0.025271)
      Station gastro_lateral_L_O_2: .. (-0.025614 -0.407319 -0.015245)
      Station vastus_int_L_O: .. (-0.001525998 -0.04166698 -0.041837)
      Station vastus_lat_L_O: .. (-0.003884997 -0.0302 -0.05673)
      Station vastus_med_L_O: .. (0.002067 -0.055282 -0.026851)
      Station bf_long_L_midpoint: .. (-0.0001069978 -0.298996 -0.020075)
      Station bf_long_L_midpoint2: .. (8.000061e-5 -0.385762 -0.033632)
      Station bf_short_L_O: .. (0.007286999 -0.282782 -0.021523)
      Station bf_short_L_midpoint: .. (0.0022 -0.351568 -0.015204)
      Station semimemb_L_midpoint: .. (-0.011754 -0.368616 0.003484003)
      Station semitend_L_midpoint: .. (-0.011054 -0.370198 0.007422)
      Station semitend_L_midpoint2: .. (-0.002485 -0.416378 0.044269)
      Station add_magnus_L_I: .. (0.010835 -0.371669 0.019861)
      Station glut_max_L_I: .. (-0.018326 -0.06399095 -0.05367599)
      Station glut_med_L_I: .. (-0.020969 -0.01837599 -0.057832)
      Station psoas_L_I: .. (-0.02561922 -0.04966277 -0.01407753)
      Station iliacus_L_I: .. (-0.02656456 -0.05514139 -0.01002738)
      WrapEllipsoid wrap_quad_L: translation=(0.023386 -0.1992 -0.02137) quadrant=all dimensions=(0.03 0.2 0.03)
      WrapSphere wrap_hip_flex_L: quadrant=all radius=0.025
    Body tibia_l: mass=3.7075 inertia=(0.037075 0.037075 0.037075 0 0 0)
      PhysicalOffsetFrame tibia_l_geom_1_offset: socket_parent=.. translation=(0 0 0)
          meshes=(C:\Program Files\opensimcreator\resources\OpenSimCreator\geometry\l_tibia.vtp)
      PhysicalOffsetFrame tibia_l_geom_2_offset: socket_parent=.. translation=(0 0 0)
          meshes=(C:\Program Files\opensimcreator\resources\OpenSimCreator\geometry\l_fibula.vtp)
      Station LKJC: .. (0.001731001 -0.002389014 0.008451998)
      Station LTB1: .. (-0.001661781 -0.156488 -0.0492394)
      Station LTB2: .. (0.0369643 -0.230107 0.003916986)
      Station LTB3: .. (0.0113793 -0.295236 -0.0553541)
      Station LLMAL: .. (-0.004999999 -0.3888 -0.053)
      Station LMMAL: .. (0.006000001 -0.3888 0.038)
      Station L_tibial_plateau: .. (-0.008089539 -0.01700002 0.001484737)
      Station gastro_L_midpoint: .. (-0.03757654 -0.2204378 -0.004864261)
      Station soleus_L_O: .. (-0.00756954 -0.0763168 -0.00765726)
      Station ant_tibialis_L_O: .. (0.01160446 -0.0392108 -0.03386926)
      Station ant_tibialis_L_midpoint: .. (0.01885346 -0.09953982 -0.01535526)
      Station ant_tibialis_L_midpoint2: .. (0.01133846 -0.3451298 -0.001191266)
      Station quad_L_I: .. (0.02412108 -0.05353892 -0.005919993)
      Station bf_long_L_I: .. (-0.01368154 -0.06808379 -0.03956027)
      Station bf_short_L_I: .. (-0.002270542 -0.06780282 -0.04008827)
      Station semimemb_L_I: .. (-0.01314354 -0.0348188 0.02845274)
      Station semitend_L_I: .. (-0.00389554 -0.06118381 0.01439274)
    Body talus_l: mass=0.1 inertia=(0.001 0.001 0.001 0 0 0)
      PhysicalOffsetFrame talus_l_geom_1_offset: socket_parent=.. translation=(0 0 0)
          meshes=(C:\Program Files\opensimcreator\resources\OpenSimCreator\geometry\l_talus.vtp)
      Station LAJC: .. (0 0 0)
    Body calcn_l: mass=1.25 inertia=(0.0125 0.0125 0.0125 0 0 0)
      PhysicalOffsetFrame calcn_l_geom_1_offset: socket_parent=.. translation=(0 0 0) orientation=(0 0 -5.852095e-98)
          meshes=(C:\Program Files\opensimcreator\resources\OpenSimCreator\geometry\l_foot.vtp)
      Station LCAL: .. (-0.02500001 0.02 0.005000003)
      Station LTOE: .. (0.205 0.02973 0.03)
      Station LMT5: .. (0.145 0.024909 -0.059)
      Station gastro-soleus_L_I: .. (-0.005856544 0.0138132 0.006380744)
      Station ant_tibialis_L_midpoint3: .. (0.09086946 0.0296452 0.03585874)
      Station ant_tibialis_L_I: .. (0.1251945 0.0196342 0.03447974)
    Body toes_l: mass=0.2166 inertia=(0.002166 0.002166 0.002166 0 0 0)
      PhysicalOffsetFrame toes_l_geom_1_offset: socket_parent=.. translation=(0 0 0) orientation=(0 0 -5.852095e-98)
          meshes=(C:\Program Files\opensimcreator\resources\OpenSimCreator\geometry\l_bofoot.vtp)
    Body patella_l: mass=0.0862 inertia=(0.000862 0.000862 0.000862 0 0 0)
      PhysicalOffsetFrame patella_l_geom_1_offset: socket_parent=.. translation=(0 0 0)
          meshes=(C:\Program Files\opensimcreator\resources\OpenSimCreator\geometry\l_patella.vtp)
      Station vastus_med_L_patella: .. (0.004089378 0.02935337 0.007129006)
      Station vastus_int_L_patella: .. (0.0003158802 0.02891766 -0.002895996)
      Station rect_fem_L_patella: .. (0.01013563 0.02957249 -0.002903998)
      Station vastus_lat_L_patella: .. (0.00587351 0.02946835 -0.01300099)
    Body torso: mass=26.8266 inertia=(0.268266 0.268266 0.268266 0 0 0)
      PhysicalOffsetFrame torso_geom_1_offset: socket_parent=.. translation=(0 0 0)
          meshes=(C:\Program Files\opensimcreator\resources\OpenSimCreator\geometry\hat_spine.vtp)
      PhysicalOffsetFrame torso_geom_2_offset: socket_parent=.. translation=(0 0 0)
          meshes=(C:\Program Files\opensimcreator\resources\OpenSimCreator\geometry\hat_jaw.vtp)
      PhysicalOffsetFrame torso_geom_3_offset: socket_parent=.. translation=(0 0 0)
          meshes=(C:\Program Files\opensimcreator\resources\OpenSimCreator\geometry\hat_skull.vtp)
      PhysicalOffsetFrame torso_geom_4_offset: socket_parent=.. translation=(0 0 0)
          meshes=(C:\Program Files\opensimcreator\resources\OpenSimCreator\geometry\hat_ribs_scap.vtp)
      Station RACR: .. (-0.002999999 0.425 0.13)
      Station LACR: .. (-0.002999999 0.425 -0.13)
      Station C7: .. (-0.085 0.4350001 0.00165426)
      Station CLAV: .. (0.04 0.38 0.017)
      Station RASH: .. (0.05 0.3715 0.17)
      Station RPSH: .. (-0.05 0.3715 0.17)
      Station LASH: .. (0.05 0.3715 -0.17)
      Station LPSH: .. (-0.05800001 0.3715 -0.17)
      Station psoas_L_O4: .. (0.009320296 0.03589368 -0.01841572)
      Station psoas_L_O3: .. (0.004437096 0.06704319 -0.01840296)
      Station psoas_L_O2: .. (-0.004322849 0.09517884 -0.01798676)
      Station psoas_L_O1: .. (-0.0121548 0.1206263 -0.01785128)
      Station psoas_R_O4: .. (0.009319998 0.03589404 0.018416)
      Station psoas_R_O3: .. (0.004437 0.06704307 0.018403)
      Station psoas_R_O2: .. (-0.004322998 0.09517896 0.017987)
      Station psoas_R_O1: .. (-0.012155 0.120626 0.017851)
      Station biceps_brach_short_R_O: .. (0.03084827 0.3840237 0.1271704)
      Station biceps_brach_long_R_O: .. (0.004595608 0.3815609 0.134519)
      Station biceps_brach_short_L_O: .. (0.030848 0.384024 -0.12717)
      Station biceps_brach_long_L_O: .. (0.004595995 0.381561 -0.134519)
      Station triceps_long_R_O: .. (-0.009663902 0.3431098 0.1449253)
      Station triceps_long_L_O: .. (-0.009663999 0.34311 -0.144925)
      Station ant_delt_L_O: .. (0.004855968 0.3987643 -0.1090973)
      Station mid_delt_L_O: .. (0.01144976 0.403592 -0.1561015)
      Station post_delt_L_O: .. (-0.04370954 0.3806287 -0.1403737)
      Station ant_delt_R_O: .. (0.004855998 0.398764 0.109097)
      Station mid_delt_R_O: .. (0.01145 0.403592 0.156101)
      Station post_delt_R_O: .. (-0.04371 0.3806291 0.140374)
      Station ext_rot_R_O: .. (-0.07290234 0.3186117 0.1024567)
      Station subscap_R_O: .. (-0.05150586 0.3400062 0.1088157)
      Station ext_rot_L_O: .. (-0.072902 0.318612 -0.102457)
      Station subscap_L_O: .. (-0.05150601 0.340006 -0.108816)
      Station pec_major_L_O8: .. (0.08139501 0.2402676 -0.01649451)
      Station pec_major_L_O7: .. (0.07695151 0.2610499 -0.01362323)
      Station pec_major_L_O6: .. (0.07139648 0.2776462 -0.009769671)
      Station pec_major_L_O5: .. (0.06426067 0.2976481 -0.009732796)
      Station pec_major_L_O4: .. (0.05664385 0.3164998 -0.01041299)
      Station pec_major_L_O3: .. (0.04867388 0.3315072 -0.009757)
      Station pec_major_L_O2: .. (0.03837556 0.3493865 -0.01073811)
      Station pec_major_L_O1: .. (0.03048552 0.3607763 -0.02254809)
      Station pec_major_R_O1: .. (0.030486 0.3607761 0.022548)
      Station pec_major_R_O2: .. (0.038376 0.349386 0.010738)
      Station pec_major_R_O3: .. (0.048674 0.331507 0.009757)
      Station pec_major_R_O4: .. (0.056644 0.3165001 0.010413)
      Station pec_major_R_O5: .. (0.064261 0.297648 0.009733)
      Station pec_major_R_O6: .. (0.071396 0.2776461 0.00977)
      Station pec_major_R_O7: .. (0.076952 0.26105 0.013623)
      Station pec_major_R_O8: .. (0.081395 0.240268 0.016495)
      Station lat_O10: .. (-0.03436723 0.008411646 0.0002797488)
      Station lat_O9: .. (-0.03517639 0.02222514 -0.0001053284)
      Station lat_O8: .. (-0.0350688 0.04224539 -0.0002371031)
      Station lat_O7: .. (-0.03643941 0.06386185 0.0002626898)
      Station lat_O6: .. (-0.04700857 0.09124982 0.0001995009)
      Station lat_05: .. (-0.05880233 0.1136775 -0.000118108)
      Station lat_O4: .. (-0.06919726 0.1407175 -0.0001751999)
      Station lat_O3: .. (-0.0750265 0.1671624 9.053852e-5)
      Station lat_O2: .. (-0.08414807 0.2032689 2.367236e-5)
      Station lat_O1: .. (-0.08679577 0.2236443 -6.535184e-5)
      Station trap_O5: .. (-0.06025065 0.4371808 -0.0002769767)
      Station trap_O4: .. (-0.05787372 0.452152 -0.000131479)
      Station trap_O3: .. (-0.05507391 0.4602716 -0.0001439734)
      Station trap_O2: .. (-0.05217827 0.469383 -4.960923e-5)
      Station trap_O1: .. (-0.04966005 0.4816059 0.0001045908)
      Station trap_O6: .. (-0.06349175 0.4122713 -1.431024e-5)
      Station trap_O7: .. (-0.06727315 0.3853896 0.0001932755)
      Station trap_O8: .. (-0.07422679 0.3654599 0.0007318002)
      Station trap_O9: .. (-0.08285444 0.3434073 0.0005639722)
      Station trap_O10: .. (-0.09009176 0.3192866 0.001271867)
      Station trap_O11: .. (-0.09265298 0.2970077 0.0004809489)
      Station trap_O12: .. (-0.09703656 0.2706509 0.0002833358)
      Station trap_O13: .. (-0.09407602 0.2435251 0.0002458622)
      Station trap_R_I: .. (-0.01340999 0.3956858 0.1647258)
      Station trap_L_I: .. (-0.01341 0.395686 -0.164726)
      Station pec_major_L0: .. (0.02437643 0.3864737 -0.03782112)
      Station pec_major_R0: .. (0.024376 0.386474 0.037821)
      WrapSphere wrap_pec_L: translation=(0.005174644 0.2885151 -0.08320411) quadrant=all radius=0.06
      WrapSphere wrap_pec_R: translation=(0.005175 0.288515 0.083204) quadrant=all radius=0.06
      WrapEllipsoid wrap_lat_R: xyz_body_rotation=(0 0 0.3472508) translation=(-0.02399763 0.1911685 0.06084907)
          quadrant=all dimensions=(0.05 0.14 0.065)
      WrapEllipsoid wrap_lat_L: xyz_body_rotation=(0 0 0.347251) translation=(-0.023998 0.191169 -0.060849)
          quadrant=all dimensions=(0.05 0.14 0.065)
      WrapEllipsoid wrap_trap_R: xyz_body_rotation=(0.05623857 -0.1320241 -0.2905824)
          translation=(-0.02732157 0.3519387 0.07588216) quadrant=all dimensions=(0.05 0.1 0.05)
      WrapEllipsoid wrap_trap_L: xyz_body_rotation=(-0.056239 -0.132024 -0.290582)
          translation=(-0.027322 0.351939 -0.075882) quadrant=all dimensions=(0.05 0.1 0.05)
    Body humerus_r: mass=2.0325 inertia=(0.020325 0.020325 0.020325 0 0 0)
      PhysicalOffsetFrame humerus_r_geom_1_offset: socket_parent=.. translation=(0 0 0)
          meshes=(C:\Program Files\opensimcreator\resources\OpenSimCreator\geometry\humerus_rv.vtp)
      Station RSJC: .. (0 0 0)
      Station RUA1: .. (0 -0.04999995 0.02)
      Station RUA2: .. (0 -0.2 0.02)
      Station RUA3: .. (0.03 -0.13 0.02)
      Station RLEL: .. (0.015 -0.28 0.03999999)
      Station RMEL: .. (0.002250001 -0.286 -0.046)
      Station biceps_brach_long_R_midpoint: .. (0.022418 0.007105947 0.001442)
      Station brachialis_R_O: .. (0.01181027 -0.1052853 -0.002274245)
      Station triceps_lat_R_O: .. (-0.001093239 -0.03696096 0.003787979)
      Station triceps_med_R_O: .. (-0.0003842115 -0.1275319 -0.0052986)
      Station brachiorad_R_O: .. (0.004945248 -0.2369088 0.006220356)
      Station flex_radi_R_O: .. (0.01080343 -0.2847532 -0.02461785)
      Station ext_radi_R_O: .. (0.001457542 -0.2770792 0.01677184)
      Station ext_ulna_R_O: .. (0.00337413 -0.284271 0.008887872)
      Station ant_delt_R_I: .. (0.014497 -0.05770695 -0.001540005)
      Station mid_delt_R_I: .. (0.011299 -0.06887496 0.006180003)
      Station post_delt_R_I: .. (0.002487995 -0.05876195 0.008088991)
      Station ext_rot_R_I: .. (0.006787091 -0.001123905 0.0186913)
      Station subscap_R_I: .. (0.02830081 -0.003430843 -0.007428333)
      Station pec_major_R_I: .. (0.011138 -0.07611597 0.005646005)
      Station lat_R_I: .. (0.01816091 -0.03119791 -0.002993479)
      Station lat_R_midpoint: .. (-0.02240824 -0.06606162 -0.02316274)
      WrapSphere wrap_delt_R: translation=(-0.001705 -0.018718 -0.023104) quadrant=all radius=0.045
    Body ulna_r: mass=0.6075 inertia=(0.006075 0.006075 0.006075 0 0 0)
      PhysicalOffsetFrame ulna_r_geom_1_offset: socket_parent=.. translation=(0 0 0)
          meshes=(C:\Program Files\opensimcreator\resources\OpenSimCreator\geometry\ulna_rv.vtp)
      Station RFAsuperior: .. (0.004604526 -0.08005786 0.0453196)
      Station REJC: .. (0 0 0)
      Station brachialis_R_I: .. (-0.005010083 -0.01695049 -0.0008737296)
      Station triceps_R_I: .. (-0.03197156 0.002305865 0.001489967)
      Station flex_ulnar_R_O: .. (-0.0226455 -0.002997875 -0.009148017)
      Station ext_polli_R_O: .. (-0.03132997 -0.1392667 0.01372711)
    Body radius_r: mass=0.6075 inertia=(0.006075 0.006075 0.006075 0 0 0)
      PhysicalOffsetFrame radius_r_geom_1_offset: socket_parent=.. translation=(0 0 0) orientation=(0 0 -5.714937e-101)
          meshes=(C:\Program Files\opensimcreator\resources\OpenSimCreator\geometry\radius_rv.vtp)
      Station RFAradius: .. (0.000500001 -0.225 0.05)
      Station RFAulna: .. (-0.022 -0.225 -0.022)
      Station biceps_brach_R_I: .. (0.004058279 -0.0281297 -0.00233525)
      Station brachiorad_R_I: .. (0.004191853 -0.2245128 0.03086337)
      Station flex_polli_R_O: .. (-0.00245633 -0.0640837 0.004162565)
    Body hand_r: mass=0.4575 inertia=(0.004575 0.004575 0.004575 0 0 0)
      PhysicalOffsetFrame [values shared by the 27 below unless stated]: socket_parent=..
          orientation=(0 0 1.483682e-67)
      PhysicalOffsetFrame hand_r_geom_1_offset: translation=(0 0 0)
          meshes=(C:\Program Files\opensimcreator\resources\OpenSimCreator\geometry\pisiform_rvs.vtp)
      PhysicalOffsetFrame hand_r_geom_2_offset: translation=(0 0 0)
          meshes=(C:\Program Files\opensimcreator\resources\OpenSimCreator\geometry\lunate_rvs.vtp)
      PhysicalOffsetFrame hand_r_geom_3_offset: translation=(0 0 0)
          meshes=(C:\Program Files\opensimcreator\resources\OpenSimCreator\geometry\scaphoid_rvs.vtp)
      PhysicalOffsetFrame hand_r_geom_4_offset: translation=(0 0 0)
          meshes=(C:\Program Files\opensimcreator\resources\OpenSimCreator\geometry\triquetrum_rvs.vtp)
      PhysicalOffsetFrame hand_r_geom_5_offset: translation=(0 0 0)
          meshes=(C:\Program Files\opensimcreator\resources\OpenSimCreator\geometry\hamate_rvs.vtp)
      PhysicalOffsetFrame hand_r_geom_6_offset: translation=(0 0 0)
          meshes=(C:\Program Files\opensimcreator\resources\OpenSimCreator\geometry\capitate_rvs.vtp)
      PhysicalOffsetFrame hand_r_geom_7_offset: translation=(0 0 0)
          meshes=(C:\Program Files\opensimcreator\resources\OpenSimCreator\geometry\trapezoid_rvs.vtp)
      PhysicalOffsetFrame hand_r_geom_8_offset: translation=(0 0 0)
          meshes=(C:\Program Files\opensimcreator\resources\OpenSimCreator\geometry\trapezium_rvs.vtp)
      PhysicalOffsetFrame hand_r_geom_9_offset: translation=(0 0 0)
          meshes=(C:\Program Files\opensimcreator\resources\OpenSimCreator\geometry\metacarpal2_rvs.vtp)
      PhysicalOffsetFrame hand_r_geom_10_offset: translation=(0 0 0)
          meshes=(C:\Program Files\opensimcreator\resources\OpenSimCreator\geometry\index_proximal_rvs.vtp)
      PhysicalOffsetFrame hand_r_geom_11_offset: translation=(0 0 0)
          meshes=(C:\Program Files\opensimcreator\resources\OpenSimCreator\geometry\index_medial_rvs.vtp)
      PhysicalOffsetFrame hand_r_geom_12_offset: translation=(0 0 0)
          meshes=(C:\Program Files\opensimcreator\resources\OpenSimCreator\geometry\index_distal_rvs.vtp)
      PhysicalOffsetFrame hand_r_geom_13_offset: translation=(0 0 0)
          meshes=(C:\Program Files\opensimcreator\resources\OpenSimCreator\geometry\metacarpal3_rvs.vtp)
      PhysicalOffsetFrame hand_r_geom_14_offset: translation=(0 0 0)
          meshes=(C:\Program Files\opensimcreator\resources\OpenSimCreator\geometry\middle_proximal_rvs.vtp)
      PhysicalOffsetFrame hand_r_geom_15_offset: translation=(0 0 0)
          meshes=(C:\Program Files\opensimcreator\resources\OpenSimCreator\geometry\middle_medial_rvs.vtp)
      PhysicalOffsetFrame hand_r_geom_16_offset: translation=(0 0 0)
          meshes=(C:\Program Files\opensimcreator\resources\OpenSimCreator\geometry\middle_distal_rvs.vtp)
      PhysicalOffsetFrame hand_r_geom_17_offset: translation=(0 0 0)
          meshes=(C:\Program Files\opensimcreator\resources\OpenSimCreator\geometry\metacarpal4_rvs.vtp)
      PhysicalOffsetFrame hand_r_geom_18_offset: translation=(0 0 0)
          meshes=(C:\Program Files\opensimcreator\resources\OpenSimCreator\geometry\ring_proximal_rvs.vtp)
      PhysicalOffsetFrame hand_r_geom_19_offset: translation=(0 0 0)
          meshes=(C:\Program Files\opensimcreator\resources\OpenSimCreator\geometry\ring_medial_rvs.vtp)
      PhysicalOffsetFrame hand_r_geom_20_offset: translation=(0 0 0)
          meshes=(C:\Program Files\opensimcreator\resources\OpenSimCreator\geometry\ring_distal_rvs.vtp)
      PhysicalOffsetFrame hand_r_geom_21_offset: translation=(0 0 0)
          meshes=(C:\Program Files\opensimcreator\resources\OpenSimCreator\geometry\metacarpal5_rvs.vtp)
      PhysicalOffsetFrame hand_r_geom_22_offset: translation=(0 0 0)
          meshes=(C:\Program Files\opensimcreator\resources\OpenSimCreator\geometry\little_proximal_rvs.vtp)
      PhysicalOffsetFrame hand_r_geom_23_offset: translation=(0 0 0)
          meshes=(C:\Program Files\opensimcreator\resources\OpenSimCreator\geometry\little_medial_rvs.vtp)
      PhysicalOffsetFrame hand_r_geom_24_offset: translation=(0 0 0)
          meshes=(C:\Program Files\opensimcreator\resources\OpenSimCreator\geometry\little_distal_rvs.vtp)
      PhysicalOffsetFrame hand_r_geom_25_offset: translation=(0 0 0)
          meshes=(C:\Program Files\opensimcreator\resources\OpenSimCreator\geometry\metacarpal1_rvs.vtp)
      PhysicalOffsetFrame hand_r_geom_26_offset: translation=(0 0 0)
          meshes=(C:\Program Files\opensimcreator\resources\OpenSimCreator\geometry\thumb_proximal_rvs.vtp)
      PhysicalOffsetFrame hand_r_geom_27_offset: translation=(0 0 0)
          meshes=(C:\Program Files\opensimcreator\resources\OpenSimCreator\geometry\thumb_distal_rvs.vtp)
      Station flex_ulnar_R_I: .. (0.00910078 -0.02248287 -0.01266415)
      Station flex_radi_R_I: .. (0.0002253503 -0.03005815 0.01169555)
      Station flex_polli_R_I: .. (0.02271013 -0.08105141 0.04137215)
      Station flex_polli_R_midpoint2: .. (0.01730146 -0.04697853 0.04138602)
      Station flex_polli_R_midpoint: .. (0.0002389699 -0.01886499 0.01764883)
      Station ext_radi_R_I: .. (-0.00869076 -0.03327662 0.01310001)
      Station ext_ulna_R_I: .. (-0.006245956 -0.02875847 -0.02115686)
      Station ext_polli_R_I: .. (0.02022858 -0.08080095 0.04570034)
      Station ext_polli_R_midpoint3: .. (0.01181699 -0.05559576 0.04679365)
      Station ext_polli_R_midpoint2: .. (-0.002383426 -0.0225963 0.02936779)
      Station ext_polli_R_midpoint: .. (-0.005967036 -0.001388788 0.001984805)
    Body humerus_l: mass=2.0325 inertia=(0.020325 0.020325 0.020325 0 0 0)
      PhysicalOffsetFrame humerus_l_geom_1_offset: socket_parent=.. translation=(0 0 0)
          meshes=(C:\Program Files\opensimcreator\resources\OpenSimCreator\geometry\humerus_lv.vtp)
      Station LSJC: .. (0 0 0)
      Station LUA1: .. (0 -0.04999995 -0.02)
      Station LUA2: .. (0 -0.2 -0.02)
      Station LUA3: .. (0.03 -0.13 -0.02)
      Station LLEL: .. (0.015 -0.28 -0.03999999)
      Station LMEL: .. (0.002250046 -0.286 0.046)
      Station biceps_brach_long_L_midpoint: .. (0.02241841 0.007106423 -0.001441911)
      Station brachialis_L_O: .. (0.01181 -0.105285 0.002274007)
      Station triceps_lat_L_O: .. (-0.001093 -0.03696096 -0.003787994)
      Station triceps_med_L_O: .. (-0.0003840029 -0.127532 0.005299002)
      Station brachiorad_L_O: .. (0.004944995 -0.236909 -0.006219998)
      Station flex_radi_L_O: .. (0.010803 -0.284753 0.024618)
      Station ext_radi_L_O: .. (0.001457997 -0.277079 -0.016772)
      Station ext_ulna_L_O: .. (0.003373995 -0.284271 -0.008887991)
      Station ant_delt_L_I: .. (0.01449686 -0.05770659 0.001540422)
      Station mid_delt_L_I: .. (0.0112987 -0.06887496 -0.006179705)
      Station post_delt_L_I: .. (0.002488345 -0.05876195 -0.008088723)
      Station ext_rot_L_I: .. (0.006786995 -0.001124024 -0.018691)
      Station subscap_L_I: .. (0.028301 -0.003430963 0.007428005)
      Station pec_major_L_I: .. (0.01113787 -0.0761162 -0.005645588)
      Station lat_L_midpoint: .. (-0.022408 -0.06606197 0.02316301)
      Station lat_L_I: .. (0.018161 -0.03119802 0.002993003)
      WrapSphere wrap_delt_L: translation=(-0.001705498 -0.01871824 0.02310446) quadrant=all radius=0.045
    Body ulna_l: mass=0.6075 inertia=(0.006075 0.006075 0.006075 0 0 0)
      PhysicalOffsetFrame ulna_l_geom_1_offset: socket_parent=.. translation=(0 0 0)
          meshes=(C:\Program Files\opensimcreator\resources\OpenSimCreator\geometry\ulna_lv.vtp)
      Station LFAsuperior: .. (0.004604526 -0.08005786 -0.0453196)
      Station LEJC: .. (0 0 0)
      Station brachialis_L_I: .. (-0.005010001 -0.01695001 0.0008739978)
      Station triceps_L_I: .. (-0.03197201 0.002305984 -0.001490012)
      Station flex_ulnar_L_O: .. (-0.022645 -0.002997994 0.009148002)
      Station ext_polli_L_O: .. (-0.03133 -0.139267 -0.01372701)
    Body radius_l: mass=0.6075 inertia=(0.006075 0.006075 0.006075 0 0 0)
      PhysicalOffsetFrame radius_l_geom_1_offset: socket_parent=.. translation=(0 0 0) orientation=(0 0 -5.714937e-101)
          meshes=(C:\Program Files\opensimcreator\resources\OpenSimCreator\geometry\radius_lv.vtp)
      Station LFAradius: .. (0.000500001 -0.225 -0.05)
      Station LFAulna: .. (-0.022 -0.225 0.022)
      Station biceps_brach_L_I: .. (0.004057996 -0.02812994 0.002334997)
      Station brachiorad_L_I: .. (0.004192002 -0.2245129 -0.030863)
      Station flex_polli_L_O: .. (-0.002456002 -0.06408393 -0.004162997)
    Body hand_l: mass=0.4575 inertia=(0.004575 0.004575 0.004575 0 0 0)
      PhysicalOffsetFrame [values shared by the 27 below unless stated]: socket_parent=..
          orientation=(0 0 1.483682e-67)
      PhysicalOffsetFrame hand_l_geom_1_offset: translation=(0 0 0)
          meshes=(C:\Program Files\opensimcreator\resources\OpenSimCreator\geometry\pisiform_lvs.vtp)
      PhysicalOffsetFrame hand_l_geom_2_offset: translation=(0 0 0)
          meshes=(C:\Program Files\opensimcreator\resources\OpenSimCreator\geometry\lunate_lvs.vtp)
      PhysicalOffsetFrame hand_l_geom_3_offset: translation=(0 0 0)
          meshes=(C:\Program Files\opensimcreator\resources\OpenSimCreator\geometry\scaphoid_lvs.vtp)
      PhysicalOffsetFrame hand_l_geom_4_offset: translation=(0 0 0)
          meshes=(C:\Program Files\opensimcreator\resources\OpenSimCreator\geometry\triquetrum_lvs.vtp)
      PhysicalOffsetFrame hand_l_geom_5_offset: translation=(0 0 0)
          meshes=(C:\Program Files\opensimcreator\resources\OpenSimCreator\geometry\hamate_lvs.vtp)
      PhysicalOffsetFrame hand_l_geom_6_offset: translation=(0 0 0)
          meshes=(C:\Program Files\opensimcreator\resources\OpenSimCreator\geometry\capitate_lvs.vtp)
      PhysicalOffsetFrame hand_l_geom_7_offset: translation=(0 0 0)
          meshes=(C:\Program Files\opensimcreator\resources\OpenSimCreator\geometry\trapezoid_lvs.vtp)
      PhysicalOffsetFrame hand_l_geom_8_offset: translation=(0 0 0)
          meshes=(C:\Program Files\opensimcreator\resources\OpenSimCreator\geometry\trapezium_lvs.vtp)
      PhysicalOffsetFrame hand_l_geom_9_offset: translation=(0 0 0)
          meshes=(C:\Program Files\opensimcreator\resources\OpenSimCreator\geometry\metacarpal2_lvs.vtp)
      PhysicalOffsetFrame hand_l_geom_10_offset: translation=(0 0 0)
          meshes=(C:\Program Files\opensimcreator\resources\OpenSimCreator\geometry\index_proximal_lvs.vtp)
      PhysicalOffsetFrame hand_l_geom_11_offset: translation=(0 0 0)
          meshes=(C:\Program Files\opensimcreator\resources\OpenSimCreator\geometry\index_medial_lvs.vtp)
      PhysicalOffsetFrame hand_l_geom_12_offset: translation=(0 0 0)
          meshes=(C:\Program Files\opensimcreator\resources\OpenSimCreator\geometry\index_distal_lvs.vtp)
      PhysicalOffsetFrame hand_l_geom_13_offset: translation=(0 0 0)
          meshes=(C:\Program Files\opensimcreator\resources\OpenSimCreator\geometry\metacarpal3_lvs.vtp)
      PhysicalOffsetFrame hand_l_geom_14_offset: translation=(0 0 0)
          meshes=(C:\Program Files\opensimcreator\resources\OpenSimCreator\geometry\middle_proximal_lvs.vtp)
      PhysicalOffsetFrame hand_l_geom_15_offset: translation=(0 0 0)
          meshes=(C:\Program Files\opensimcreator\resources\OpenSimCreator\geometry\middle_medial_lvs.vtp)
      PhysicalOffsetFrame hand_l_geom_16_offset: translation=(0 0 0)
          meshes=(C:\Program Files\opensimcreator\resources\OpenSimCreator\geometry\middle_distal_lvs.vtp)
      PhysicalOffsetFrame hand_l_geom_17_offset: translation=(0 0 0)
          meshes=(C:\Program Files\opensimcreator\resources\OpenSimCreator\geometry\metacarpal4_lvs.vtp)
      PhysicalOffsetFrame hand_l_geom_18_offset: translation=(0 0 0)
          meshes=(C:\Program Files\opensimcreator\resources\OpenSimCreator\geometry\ring_proximal_lvs.vtp)
      PhysicalOffsetFrame hand_l_geom_19_offset: translation=(0 0 0)
          meshes=(C:\Program Files\opensimcreator\resources\OpenSimCreator\geometry\ring_medial_lvs.vtp)
      PhysicalOffsetFrame hand_l_geom_20_offset: translation=(0 0 0)
          meshes=(C:\Program Files\opensimcreator\resources\OpenSimCreator\geometry\ring_distal_lvs.vtp)
      PhysicalOffsetFrame hand_l_geom_21_offset: translation=(0 0 0)
          meshes=(C:\Program Files\opensimcreator\resources\OpenSimCreator\geometry\metacarpal5_lvs.vtp)
      PhysicalOffsetFrame hand_l_geom_22_offset: translation=(0 0 0)
          meshes=(C:\Program Files\opensimcreator\resources\OpenSimCreator\geometry\little_proximal_lvs.vtp)
      PhysicalOffsetFrame hand_l_geom_23_offset: translation=(0 0 0)
          meshes=(C:\Program Files\opensimcreator\resources\OpenSimCreator\geometry\little_medial_lvs.vtp)
      PhysicalOffsetFrame hand_l_geom_24_offset: translation=(0 0 0)
          meshes=(C:\Program Files\opensimcreator\resources\OpenSimCreator\geometry\little_distal_lvs.vtp)
      PhysicalOffsetFrame hand_l_geom_25_offset: translation=(0 0 0)
          meshes=(C:\Program Files\opensimcreator\resources\OpenSimCreator\geometry\metacarpal1_lvs.vtp)
      PhysicalOffsetFrame hand_l_geom_26_offset: translation=(0 0 0)
          meshes=(C:\Program Files\opensimcreator\resources\OpenSimCreator\geometry\thumb_proximal_lvs.vtp)
      PhysicalOffsetFrame hand_l_geom_27_offset: translation=(0 0 0)
          meshes=(C:\Program Files\opensimcreator\resources\OpenSimCreator\geometry\thumb_distal_lvs.vtp)
      Station flex_ulnar_L_I: .. (0.009100996 -0.02248299 0.01266399)
      Station flex_radi_L_I: .. (0.0002250001 -0.03005797 -0.01169601)
      Station flex_polli_L_midpoint: .. (0.0002389997 -0.01886499 -0.01764901)
      Station flex_polli_L_midpoint2: .. (0.01730099 -0.04697901 -0.04138601)
      Station flex_polli_L_I: .. (0.02271 -0.08105099 -0.041372)
      Station ext_radi_L_I: .. (-0.008691005 -0.03327698 -0.01310001)
      Station ext_ulna_L_I: .. (-0.006246001 -0.02875799 0.021157)
      Station ext_polli_L_I: .. (0.020229 -0.08080101 -0.04570001)
      Station ext_polli_L_midpoint3: .. (0.01181699 -0.05559599 -0.04679401)
      Station ext_polli_L_midpoint2: .. (-0.002383001 -0.022596 -0.02936801)
      Station ext_polli_L_midpoint: .. (-0.005967006 -0.001388967 -0.001985013)
  JointSet:
    CustomJoint [values shared by the 10 below unless stated]:
      SpatialTransform:
        TransformAxis rotation1: axis=(1 0 0)
        TransformAxis rotation2: axis=(0 1 0)
        TransformAxis rotation3: coordinates=rx axis=(0 0 1) LinearFunction(coefficients=1 0)
        TransformAxis translation1: axis=(1 0 0)
        TransformAxis translation2: axis=(0 1 0)
        TransformAxis translation3: axis=(0 0 1)
    CustomJoint ground_pelvis: socket_parent_frame=ground_offset socket_child_frame=pelvis_offset
      Coordinate rx: default_value=0 range=(-9.424778 9.424778)
      PhysicalOffsetFrame ground_offset: socket_parent=/ground translation=(0 0 0)
      PhysicalOffsetFrame pelvis_offset: socket_parent=/bodyset/pelvis translation=(0 -0.94 0)
    CustomJoint hip_r: socket_parent_frame=pelvis_offset socket_child_frame=femur_r_offset
      Coordinate rx: default_value=0 range=(-9.424778 9.424778)
      PhysicalOffsetFrame pelvis_offset: socket_parent=/bodyset/pelvis translation=(-0.056276 -0.07849002 0.07726)
      PhysicalOffsetFrame femur_r_offset: socket_parent=/bodyset/femur_r translation=(0 0 0)
    CustomJoint walker_knee_r: socket_parent_frame=femur_r_offset socket_child_frame=tibia_r_offset
      Coordinate rx: default_value=0 range=(-9.424778 9.424778)
      PhysicalOffsetFrame femur_r_offset: socket_parent=/bodyset/femur_r
          translation=(-0.008089997 -0.40796 -0.002750002) orientation=(-1.641571 1.44618 1.570801)
      PhysicalOffsetFrame tibia_r_offset: socket_parent=/bodyset/tibia_r
          translation=(-0.008089539 -0.003534794 -0.001484737) orientation=(-1.641571 1.44618 1.570801)
    PinJoint ankle_r: socket_parent_frame=tibia_r_offset socket_child_frame=talus_r_offset
      Coordinate ankle_r_rz: default_value=0
      PhysicalOffsetFrame tibia_r_offset: socket_parent=/bodyset/tibia_r translation=(-0.01 -0.4 0)
          orientation=(0.175895 -0.105208 0.0186622)
      PhysicalOffsetFrame talus_r_offset: socket_parent=/bodyset/talus_r translation=(0 0 0)
          orientation=(0.175895 -0.105208 0.0186622)
    PinJoint subtalar_r: socket_parent_frame=talus_r_offset socket_child_frame=calcn_r_offset
      Coordinate subtalar_r_rz: default_value=0
      PhysicalOffsetFrame talus_r_offset: socket_parent=/bodyset/talus_r translation=(-0.04877 -0.04195 0.007920004)
          orientation=(-1.76819 0.906223 1.8196)
      PhysicalOffsetFrame calcn_r_offset: socket_parent=/bodyset/calcn_r translation=(0 0 0)
          orientation=(-1.76819 0.906223 1.8196)
    PinJoint mtp_r: socket_parent_frame=calcn_r_offset socket_child_frame=toes_r_offset
      Coordinate mtp_r_rz: default_value=0
      PhysicalOffsetFrame calcn_r_offset: socket_parent=/bodyset/calcn_r translation=(0.1788 -0.002 0.001079999)
          orientation=(-3.14159 0.6199009 6.878953e-8)
      PhysicalOffsetFrame toes_r_offset: socket_parent=/bodyset/toes_r translation=(0 0 0)
          orientation=(-3.14159 0.6199009 6.878953e-8)
    CustomJoint patellofemoral_r: socket_parent_frame=femur_r_offset socket_child_frame=patella_r_offset
      Coordinate rx: default_value=0 range=(-9.424778 9.424778)
      PhysicalOffsetFrame femur_r_offset: socket_parent=/bodyset/femur_r
          translation=(-0.008089997 -0.40796 -0.002750002)
      PhysicalOffsetFrame patella_r_offset: socket_parent=/bodyset/patella_r
          translation=(-0.05238767 0.01085958 -0.002750002) orientation=(0 0 -0.00113686)
    CustomJoint hip_l: socket_parent_frame=pelvis_offset socket_child_frame=femur_l_offset
      Coordinate rx: default_value=0 range=(-9.424778 9.424778)
      PhysicalOffsetFrame pelvis_offset: socket_parent=/bodyset/pelvis translation=(-0.056276 -0.07849002 -0.07726)
      PhysicalOffsetFrame femur_l_offset: socket_parent=/bodyset/femur_l translation=(0 0 0)
    CustomJoint walker_knee_l: socket_parent_frame=femur_l_offset socket_child_frame=tibia_l_offset
      Coordinate rx: default_value=0 range=(-9.424778 9.424778)
      PhysicalOffsetFrame femur_l_offset: socket_parent=/bodyset/femur_l
          translation=(-0.008089997 -0.40796 0.002750002) orientation=(1.641571 -1.44618 1.570801)
      PhysicalOffsetFrame tibia_l_offset: socket_parent=/bodyset/tibia_l
          translation=(-0.008089539 -0.003534794 0.001484737) orientation=(1.641571 -1.44618 1.570801)
    PinJoint ankle_l: socket_parent_frame=tibia_l_offset socket_child_frame=talus_l_offset
      Coordinate ankle_l_rz: default_value=0
      PhysicalOffsetFrame tibia_l_offset: socket_parent=/bodyset/tibia_l translation=(-0.01 -0.4 0)
          orientation=(-0.175895 0.105208 0.0186622)
      PhysicalOffsetFrame talus_l_offset: socket_parent=/bodyset/talus_l translation=(0 0 0)
          orientation=(-0.175895 0.105208 0.0186622)
    PinJoint subtalar_l: socket_parent_frame=talus_l_offset socket_child_frame=calcn_l_offset
      Coordinate subtalar_l_rz: default_value=0
      PhysicalOffsetFrame talus_l_offset: socket_parent=/bodyset/talus_l translation=(-0.04877 -0.04195 -0.007920004)
          orientation=(1.76819 -0.906223 1.8196)
      PhysicalOffsetFrame calcn_l_offset: socket_parent=/bodyset/calcn_l translation=(0 0 0)
          orientation=(1.76819 -0.906223 1.8196)
    PinJoint mtp_l: socket_parent_frame=calcn_l_offset socket_child_frame=toes_l_offset
      Coordinate mtp_l_rz: default_value=0
      PhysicalOffsetFrame calcn_l_offset: socket_parent=/bodyset/calcn_l translation=(0.1788 -0.002 -0.001079999)
          orientation=(-3.14159 -0.6199009 -6.878953e-8)
      PhysicalOffsetFrame toes_l_offset: socket_parent=/bodyset/toes_l translation=(0 0 0)
          orientation=(-3.14159 -0.6199009 -6.878953e-8)
    CustomJoint patellofemoral_l: socket_parent_frame=femur_l_offset socket_child_frame=patella_l_offset
      Coordinate rx: default_value=0 range=(-9.424778 9.424778)
      PhysicalOffsetFrame femur_l_offset: socket_parent=/bodyset/femur_l
          translation=(-0.008089997 -0.40796 0.002750002)
      PhysicalOffsetFrame patella_l_offset: socket_parent=/bodyset/patella_l
          translation=(-0.05238767 0.01085958 0.002750002) orientation=(0 0 -0.00113686)
    CustomJoint back: socket_parent_frame=pelvis_offset socket_child_frame=torso_offset
      Coordinate rx: default_value=0 range=(-9.424778 9.424778)
      PhysicalOffsetFrame pelvis_offset: socket_parent=/bodyset/pelvis translation=(-0.1007 0.08149999 0)
      PhysicalOffsetFrame torso_offset: socket_parent=/bodyset/torso translation=(0 0 0)
    CustomJoint acromial_r: socket_parent_frame=torso_offset socket_child_frame=humerus_r_offset
      Coordinate rx: default_value=0 range=(-9.424778 9.424778)
      PhysicalOffsetFrame torso_offset: socket_parent=/bodyset/torso translation=(0.003155001 0.3715 0.17)
      PhysicalOffsetFrame humerus_r_offset: socket_parent=/bodyset/humerus_r translation=(0 0 0)
    PinJoint elbow_r: socket_parent_frame=humerus_r_offset socket_child_frame=ulna_r_offset
      Coordinate elbow_r_rz: default_value=0
      PhysicalOffsetFrame humerus_r_offset: socket_parent=/bodyset/humerus_r
          translation=(0.013144 -0.286273 -0.009595007) orientation=(-0.0228627 0.228018 0.005168898)
      PhysicalOffsetFrame ulna_r_offset: socket_parent=/bodyset/ulna_r translation=(0 0 0)
          orientation=(-0.0228627 0.228018 0.005168898)
    PinJoint radioulnar_r: socket_parent_frame=ulna_r_offset socket_child_frame=radius_r_offset
      Coordinate radioulnar_r_rz: default_value=0
      PhysicalOffsetFrame ulna_r_offset: socket_parent=/bodyset/ulna_r
          translation=(-0.006727003 -0.01300704 0.02608301) orientation=(-1.56884 0.05642792 1.53614)
      PhysicalOffsetFrame radius_r_offset: socket_parent=/bodyset/radius_r translation=(0 0 0)
          orientation=(-1.56884 0.05642792 1.53614)
    UniversalJoint radius_hand_r: socket_parent_frame=radius_r_offset socket_child_frame=hand_r_offset
      Coordinate rx: default_value=0
      Coordinate ry: default_value=0
      PhysicalOffsetFrame radius_r_offset: socket_parent=/bodyset/radius_r
          translation=(-0.008796997 -0.235841 0.01360999) orientation=(-1.5708 2.980232e-8 -1.5708)
      PhysicalOffsetFrame hand_r_offset: socket_parent=/bodyset/hand_r translation=(0 0 0)
          orientation=(-1.5708 2.980232e-8 -1.5708)
    CustomJoint acromial_l: socket_parent_frame=torso_offset socket_child_frame=humerus_l_offset
      Coordinate rx: default_value=0 range=(-9.424778 9.424778)
      PhysicalOffsetFrame torso_offset: socket_parent=/bodyset/torso translation=(0.003155001 0.3715 -0.17)
      PhysicalOffsetFrame humerus_l_offset: socket_parent=/bodyset/humerus_l translation=(0 0 0)
    PinJoint elbow_l: socket_parent_frame=humerus_l_offset socket_child_frame=ulna_l_offset
      Coordinate elbow_l_rz: default_value=0
      PhysicalOffsetFrame humerus_l_offset: socket_parent=/bodyset/humerus_l
          translation=(0.013144 -0.286273 0.009595007) orientation=(0.0228627 -0.228018 0.005168898)
      PhysicalOffsetFrame ulna_l_offset: socket_parent=/bodyset/ulna_l translation=(0 0 0)
          orientation=(0.0228627 -0.228018 0.005168898)
    PinJoint radioulnar_l: socket_parent_frame=ulna_l_offset socket_child_frame=radius_l_offset
      Coordinate radioulnar_l_rz: default_value=0
      PhysicalOffsetFrame ulna_l_offset: socket_parent=/bodyset/ulna_l
          translation=(-0.006727003 -0.01300704 -0.02608301) orientation=(1.56884 -0.05642792 1.53614)
      PhysicalOffsetFrame radius_l_offset: socket_parent=/bodyset/radius_l translation=(0 0 0)
          orientation=(1.56884 -0.05642792 1.53614)
    UniversalJoint radius_hand_l: socket_parent_frame=radius_l_offset socket_child_frame=hand_l_offset
      Coordinate rx: default_value=0
      Coordinate ry: default_value=0
      PhysicalOffsetFrame radius_l_offset: socket_parent=/bodyset/radius_l
          translation=(-0.008796997 -0.235841 -0.01360999) orientation=(1.5708 2.980232e-8 1.5708)
      PhysicalOffsetFrame hand_l_offset: socket_parent=/bodyset/hand_l translation=(0 0 0)
          orientation=(1.5708 2.980232e-8 1.5708)
  ForceSet:
    Millard2012EquilibriumMuscle [values shared by the 166 below unless stated]:
      ActiveForceLengthCurve: minimum_value=0
      ForceVelocityCurve: concentric_slope_at_vmax=0 concentric_slope_near_vmax=0.25 isometric_slope=5
          eccentric_slope_at_vmax=0 eccentric_slope_near_vmax=0.15 max_eccentric_velocity_force_multiplier=1.4
      FiberForceLengthCurve
      TendonForceLengthCurve
    Millard2012EquilibriumMuscle gastro_lateral_R: min_control=0.01 max_control=1
      PathPoint P1: femur_r (-0.008639924 -0.3904748 0.02283328)
      PathPoint P2: femur_r (-0.02561404 -0.4073194 0.01524452)
      PathPoint P3: tibia_r (-0.03757608 -0.2204375 0.004863776)
      PathPoint P4: calcn_r (-0.005856559 0.01381358 -0.006380938)
    Millard2012EquilibriumMuscle gastro_medial_R: min_control=0.01 max_control=1
      PathPoint P1: femur_r (-0.007398985 -0.391463 -0.02771763)
      PathPoint P2: femur_r (-0.02693287 -0.407887 -0.0252707)
      PathPoint P3: tibia_r (-0.03757608 -0.2204375 0.004863776)
      PathPoint P4: calcn_r (-0.005856559 0.01381358 -0.006380938)
    Millard2012EquilibriumMuscle gastro_lateral_L: min_control=0.01 max_control=1
      PathPoint P1: femur_l (-0.008639999 -0.390475 -0.022833)
      PathPoint P2: femur_l (-0.025614 -0.407319 -0.015245)
      PathPoint P3: tibia_l (-0.03757654 -0.2204378 -0.004864261)
      PathPoint P4: calcn_l (-0.005856544 0.0138132 0.006380744)
    Millard2012EquilibriumMuscle gastro_medial_L: min_control=0.01 max_control=1
      PathPoint P1: femur_l (-0.007399 -0.391463 0.027718)
      PathPoint P2: femur_l (-0.026933 -0.407887 0.025271)
      PathPoint P3: tibia_l (-0.03757654 -0.2204378 -0.004864261)
      PathPoint P4: calcn_l (-0.005856544 0.0138132 0.006380744)
    Millard2012EquilibriumMuscle soleus_R: min_control=0.01 max_control=1
      PathPoint P1: tibia_r (-0.007569384 -0.07631665 0.00765691)
      PathPoint P2: calcn_r (-0.005856559 0.01381358 -0.006380938)
    Millard2012EquilibriumMuscle soleus_L: min_control=0.01 max_control=1
      PathPoint P1: tibia_l (-0.00756954 -0.0763168 -0.00765726)
      PathPoint P2: calcn_l (-0.005856544 0.0138132 0.006380744)
    Millard2012EquilibriumMuscle ant_tibialis_R: min_control=0.01 max_control=1
      PathPoint P1: tibia_r (0.01160397 -0.03921127 0.0338693)
      PathPoint P2: tibia_r (0.0188535 -0.09953991 0.01535495)
      PathPoint P3: tibia_r (0.01133889 -0.3451298 0.001191065)
      PathPoint P4: calcn_r (0.09086943 0.02964569 -0.03585902)
      PathPoint P5: calcn_r (0.1251947 0.019634 -0.03447968)
    Millard2012EquilibriumMuscle ant_tibialis_L: min_control=0.01 max_control=1
      PathPoint P1: tibia_l (0.01160446 -0.0392108 -0.03386926)
      PathPoint P2: tibia_l (0.01885346 -0.09953982 -0.01535526)
      PathPoint P3: tibia_l (0.01133846 -0.3451298 -0.001191266)
      PathPoint P4: calcn_l (0.09086946 0.0296452 0.03585874)
      PathPoint P5: calcn_l (0.1251945 0.0196342 0.03447974)
    Millard2012EquilibriumMuscle rect_fem_R: min_control=0.01 max_control=1
      PathPoint P1: pelvis (-0.02886196 -0.03015667 0.09918958)
      PathPoint P2: patella_r (0.01013569 0.02957204 0.002904445)
      PathPoint P3: tibia_r (0.02412146 -0.0535388 0.005920261)
      PathWrap: wrap_object=wrap_quad_R method=hybrid
    Millard2012EquilibriumMuscle rect_fem_L: min_control=0.01 max_control=1
      PathPoint P1: pelvis (-0.028862 -0.03015697 -0.09919)
      PathPoint P2: patella_l (0.01013563 0.02957249 -0.002903998)
      PathPoint P3: tibia_l (0.02412108 -0.05353892 -0.005919993)
      PathWrap: wrap_object=wrap_quad_L method=hybrid
    Millard2012EquilibriumMuscle vastus_lat_R: min_control=0.01 max_control=1
      PathPoint P1: femur_r (-0.003884815 -0.03019953 0.0567302)
      PathPoint P2: patella_r (0.005873818 0.02946802 0.01300081)
      PathPoint P3: tibia_r (0.02412146 -0.0535388 0.005920261)
      PathWrap: wrap_object=wrap_quad_R method=hybrid
    Millard2012EquilibriumMuscle vastus_lat_L: min_control=0.01 max_control=1
      PathPoint P1: femur_l (-0.003884997 -0.0302 -0.05673)
      PathPoint P2: patella_l (0.00587351 0.02946835 -0.01300099)
      PathPoint P3: tibia_l (0.02412108 -0.05353892 -0.005919993)
      PathWrap: wrap_object=wrap_quad_L method=hybrid
    Millard2012EquilibriumMuscle vastus_med_R: min_control=0.01 max_control=1
      PathPoint P1: femur_r (0.002067305 -0.05528188 0.02685072)
      PathPoint P2: patella_r (0.00408945 0.02935346 -0.007129028)
      PathPoint P3: tibia_r (0.02412146 -0.0535388 0.005920261)
      PathWrap: wrap_object=wrap_quad_R method=hybrid
    Millard2012EquilibriumMuscle vastus_int_R: min_control=0.01 max_control=1
      PathPoint P1: femur_r (-0.001525514 -0.04166722 0.04183711)
      PathPoint P2: patella_r (0.0003161482 0.02891745 0.002896123)
      PathPoint P3: tibia_r (0.02412146 -0.0535388 0.005920261)
    Millard2012EquilibriumMuscle vastus_med_L: min_control=0.01 max_control=1
      PathPoint P1: femur_l (0.002067 -0.055282 -0.026851)
      PathPoint P2: patella_l (0.004089378 0.02935337 0.007129006)
      PathPoint P3: tibia_l (0.02412108 -0.05353892 -0.005919993)
      PathWrap: wrap_object=wrap_quad_L method=hybrid
    Millard2012EquilibriumMuscle vastus_int_L: min_control=0.01 max_control=1
      PathPoint P1: femur_l (-0.001525998 -0.04166698 -0.041837)
      PathPoint P2: patella_l (0.0003158802 0.02891766 -0.002895996)
      PathPoint P3: tibia_l (0.02412108 -0.05353892 -0.005919993)
    Millard2012EquilibriumMuscle bf_long_R: min_control=0.01 max_control=1
      PathPoint P1: pelvis (-0.125149 -0.1048394 0.05793559)
      PathPoint P2: femur_r (-0.000107117 -0.298996 0.02007476)
      PathPoint P3: femur_r (7.997453e-5 -0.3857616 0.03363166)
      PathPoint P4: tibia_r (-0.01368197 -0.06808397 0.03956024)
    Millard2012EquilibriumMuscle bf_short_R: min_control=0.01 max_control=1
      PathPoint P1: femur_r (0.007287301 -0.2827815 0.021523)
      PathPoint P2: femur_r (0.00220032 -0.3515679 0.01520379)
      PathPoint P3: tibia_r (-0.002270129 -0.06780246 0.04008793)
    Millard2012EquilibriumMuscle bf_long_L: min_control=0.01 max_control=1
      PathPoint P1: pelvis (-0.125149 -0.104839 -0.057936)
      PathPoint P2: femur_l (-0.0001069978 -0.298996 -0.020075)
      PathPoint P3: femur_l (8.000061e-5 -0.385762 -0.033632)
      PathPoint P4: tibia_l (-0.01368154 -0.06808379 -0.03956027)
    Millard2012EquilibriumMuscle bf_short_L: min_control=0.01 max_control=1
      PathPoint P1: femur_l (0.007286999 -0.282782 -0.021523)
      PathPoint P2: femur_l (0.0022 -0.351568 -0.015204)
      PathPoint P3: tibia_l (-0.002270542 -0.06780282 -0.04008827)
    Millard2012EquilibriumMuscle semitend_R: min_control=0.01 max_control=1
      PathPoint P1: pelvis (-0.1343624 -0.08815169 0.06383903)
      PathPoint P2: femur_r (-0.01105449 -0.370198 -0.007421643)
      PathPoint P3: femur_r (-0.002485298 -0.4163785 -0.04426853)
      PathPoint P4: tibia_r (-0.00389586 -0.0611842 -0.01439274)
    Millard2012EquilibriumMuscle semitend_L: min_control=0.01 max_control=1
      PathPoint P1: pelvis (-0.134362 -0.08815199 -0.063839)
      PathPoint P2: femur_l (-0.011054 -0.370198 0.007422)
      PathPoint P3: femur_l (-0.002485 -0.416378 0.044269)
      PathPoint P4: tibia_l (-0.00389554 -0.06118381 0.01439274)
    Millard2012EquilibriumMuscle semimemb_R: min_control=0.01 max_control=1
      PathPoint P1: pelvis (-0.1275382 -0.08856475 0.0680287)
      PathPoint P2: femur_r (-0.01175412 -0.3686156 -0.003484368)
      PathPoint P3: tibia_r (-0.01314361 -0.03481874 -0.02845234)
    Millard2012EquilibriumMuscle semimemb_L: min_control=0.01 max_control=1
      PathPoint P1: pelvis (-0.127538 -0.08856499 -0.068029)
      PathPoint P2: femur_l (-0.011754 -0.368616 0.003484003)
      PathPoint P3: tibia_l (-0.01314354 -0.0348188 0.02845274)
    Millard2012EquilibriumMuscle add_magnus_R: min_control=0.01 max_control=1
      PathPoint P1: pelvis (-0.1049716 -0.1150737 0.04038837)
      PathPoint P2: femur_r (0.01083487 -0.3716686 -0.01986081)
    Millard2012EquilibriumMuscle add_magnus_L: min_control=0.01 max_control=1
      PathPoint P1: pelvis (-0.104972 -0.115074 -0.040388)
      PathPoint P2: femur_l (0.010835 -0.371669 0.019861)
    Millard2012EquilibriumMuscle iliacus_R1: min_control=0.01 max_control=1
      PathPoint P1: pelvis (-0.085769 0.05048102 0.063058)
      PathPoint P2: pelvis (-0.03698 -0.05152398 0.069295)
      PathPoint P3: femur_r (-0.026565 -0.05514097 0.010027)
      PathWrap: wrap_object=wrap_hip_flex_R method=hybrid
    Millard2012EquilibriumMuscle iliacus_R2: min_control=0.01 max_control=1
      PathPoint P1: pelvis (-0.075722 0.05818999 0.075284)
      PathPoint P2: pelvis (-0.03698 -0.05152398 0.069295)
      PathPoint P3: femur_r (-0.026565 -0.05514097 0.010027)
      PathWrap: wrap_object=wrap_hip_flex_R method=hybrid
    Millard2012EquilibriumMuscle iliacus_R3: min_control=0.01 max_control=1
      PathPoint P1: pelvis (-0.064972 0.05711502 0.08897)
      PathPoint P2: pelvis (-0.03698 -0.05152398 0.069295)
      PathPoint P3: femur_r (-0.026565 -0.05514097 0.010027)
      PathWrap: wrap_object=wrap_hip_flex_R method=hybrid
    Millard2012EquilibriumMuscle iliacus_R4: min_control=0.01 max_control=1
      PathPoint P1: pelvis (-0.05116 0.052338 0.101302)
      PathPoint P2: pelvis (-0.03698 -0.05152398 0.069295)
      PathPoint P3: femur_r (-0.026565 -0.05514097 0.010027)
      PathWrap: wrap_object=wrap_hip_flex_R method=hybrid
    Millard2012EquilibriumMuscle iliacus_L1: min_control=0.01 max_control=1
      PathPoint P1: pelvis (-0.08576921 0.0504815 -0.06305785)
      PathPoint P2: pelvis (-0.03698049 -0.05152446 -0.0692948)
      PathPoint P3: femur_l (-0.02656456 -0.05514139 -0.01002738)
      PathWrap: wrap_object=wrap_hip_flex_L method=hybrid
    Millard2012EquilibriumMuscle iliacus_L2: min_control=0.01 max_control=1
      PathPoint P1: pelvis (-0.07572198 0.05819035 -0.07528363)
      PathPoint P2: pelvis (-0.03698049 -0.05152446 -0.0692948)
      PathPoint P3: femur_l (-0.02656456 -0.05514139 -0.01002738)
      PathWrap: wrap_object=wrap_hip_flex_L method=hybrid
    Millard2012EquilibriumMuscle iliacus_L3: min_control=0.01 max_control=1
      PathPoint P1: pelvis (-0.06497246 0.05711508 -0.08896969)
      PathPoint P2: pelvis (-0.03698049 -0.05152446 -0.0692948)
      PathPoint P3: femur_l (-0.02656456 -0.05514139 -0.01002738)
      PathWrap: wrap_object=wrap_hip_flex_L method=hybrid
    Millard2012EquilibriumMuscle iliacus_L4: min_control=0.01 max_control=1
      PathPoint P1: pelvis (-0.05116031 0.05233759 -0.1013019)
      PathPoint P2: pelvis (-0.03698049 -0.05152446 -0.0692948)
      PathPoint P3: femur_l (-0.02656456 -0.05514139 -0.01002738)
      PathWrap: wrap_object=wrap_hip_flex_L method=hybrid
    Millard2012EquilibriumMuscle psoas_R1: min_control=0.01 max_control=1
      PathPoint P1: torso (-0.012155 0.120626 0.017851)
      PathPoint P2: pelvis (-0.03656 -0.056494 0.060727)
      PathPoint P3: femur_r (-0.025619 -0.04966301 0.014078)
      PathWrap: wrap_object=wrap_hip_flex_R method=hybrid
    Millard2012EquilibriumMuscle psoas_R2: min_control=0.01 max_control=1
      PathPoint P1: torso (-0.004322998 0.09517896 0.017987)
      PathPoint P2: pelvis (-0.03656 -0.056494 0.060727)
      PathPoint P3: femur_r (-0.025619 -0.04966301 0.014078)
      PathWrap: wrap_object=wrap_hip_flex_R method=hybrid
    Millard2012EquilibriumMuscle psoas_R3: min_control=0.01 max_control=1
      PathPoint P1: torso (0.004437 0.06704307 0.018403)
      PathPoint P2: pelvis (-0.03656 -0.056494 0.060727)
      PathPoint P3: femur_r (-0.025619 -0.04966301 0.014078)
      PathWrap: wrap_object=wrap_hip_flex_R method=hybrid
    Millard2012EquilibriumMuscle psoas_R4: min_control=0.01 max_control=1
      PathPoint P1: torso (0.009319998 0.03589404 0.018416)
      PathPoint P2: pelvis (-0.03656 -0.056494 0.060727)
      PathPoint P3: femur_r (-0.025619 -0.04966301 0.014078)
      PathWrap: wrap_object=wrap_hip_flex_R method=hybrid
    Millard2012EquilibriumMuscle psoas_L1: min_control=0.01 max_control=1
      PathPoint psoas_L-P1: torso (-0.0121548 0.1206263 -0.01785128)
      PathPoint psoas_L-P2: pelvis (-0.03656036 -0.05649406 -0.06072673)
      PathPoint psoas_L-P3: femur_l (-0.02561922 -0.04966277 -0.01407753)
      PathWrap: wrap_object=wrap_hip_flex_L method=hybrid
    Millard2012EquilibriumMuscle psoas_L2: min_control=0.01 max_control=1
      PathPoint P1: torso (-0.004322849 0.09517884 -0.01798676)
      PathPoint P2: pelvis (-0.03656036 -0.05649406 -0.06072673)
      PathPoint P3: femur_l (-0.02561922 -0.04966277 -0.01407753)
      PathWrap: wrap_object=wrap_hip_flex_L method=hybrid
    Millard2012EquilibriumMuscle psoas_L3: min_control=0.01 max_control=1
      PathPoint P1: torso (0.004437096 0.06704319 -0.01840296)
      PathPoint P2: pelvis (-0.03656036 -0.05649406 -0.06072673)
      PathPoint P3: femur_l (-0.02561922 -0.04966277 -0.01407753)
      PathWrap: wrap_object=wrap_hip_flex_L method=hybrid
    Millard2012EquilibriumMuscle psoas_L4: min_control=0.01 max_control=1
      PathPoint P1: torso (0.009320296 0.03589368 -0.01841572)
      PathPoint P2: pelvis (-0.03656036 -0.05649406 -0.06072673)
      PathPoint P3: femur_l (-0.02561922 -0.04966277 -0.01407753)
      PathWrap: wrap_object=wrap_hip_flex_L method=hybrid
    Millard2012EquilibriumMuscle glut_max_R1: min_control=0.01 max_control=1
      PathPoint P1: pelvis (-0.1233018 0.07099408 0.06186732)
      PathPoint P2: femur_r (-0.01832565 -0.06399083 0.05367643)
      PathWrap: wrap_object=wrap_glutmax_R method=hybrid
    Millard2012EquilibriumMuscle glut_max_R2: min_control=0.01 max_control=1
      PathPoint P1: pelvis (-0.1305333 0.0611164 0.06008377)
      PathPoint P2: femur_r (-0.01832565 -0.06399083 0.05367643)
      PathWrap: wrap_object=wrap_glutmax_R method=hybrid
    Millard2012EquilibriumMuscle glut_max_R3: min_control=0.01 max_control=1
      PathPoint P1: pelvis (-0.1376102 0.05182248 0.05689009)
      PathPoint P2: femur_r (-0.01832565 -0.06399083 0.05367643)
      PathWrap: wrap_object=wrap_glutmax_R method=hybrid
    Millard2012EquilibriumMuscle glut_max_R4: min_control=0.01 max_control=1
      PathPoint P1: pelvis (-0.1441247 0.03810453 0.05364086)
      PathPoint P2: femur_r (-0.01832565 -0.06399083 0.05367643)
      PathWrap: wrap_object=wrap_glutmax_R method=hybrid
    Millard2012EquilibriumMuscle glut_max_R5: min_control=0.01 max_control=1
      PathPoint P1: pelvis (-0.1522336 0.0207184 0.04687474)
      PathPoint P2: femur_r (-0.01832565 -0.06399083 0.05367643)
      PathWrap: wrap_object=wrap_glutmax_R method=hybrid
    Millard2012EquilibriumMuscle glut_max_R6: min_control=0.01 max_control=1
      PathPoint P1: pelvis (-0.1629553 0.004777551 0.03796745)
      PathPoint P2: femur_r (-0.01832565 -0.06399083 0.05367643)
      PathWrap: wrap_object=wrap_glutmax_R method=hybrid
    Millard2012EquilibriumMuscle glut_max_R7: min_control=0.01 max_control=1
      PathPoint P1: pelvis (-0.1697764 -0.01080602 0.02862071)
      PathPoint P2: femur_r (-0.01832565 -0.06399083 0.05367643)
      PathWrap: wrap_object=wrap_glutmax_R method=hybrid
    Millard2012EquilibriumMuscle glut_max_L1: min_control=0.01 max_control=1
      PathPoint P1: pelvis (-0.123302 0.07099396 -0.061867)
      PathPoint P2: femur_l (-0.018326 -0.06399095 -0.05367599)
      PathWrap: wrap_object=wrap_glutmax_L method=hybrid
    Millard2012EquilibriumMuscle glut_max_L2: min_control=0.01 max_control=1
      PathPoint P1: pelvis (-0.130533 0.06111604 -0.060084)
      PathPoint P2: femur_l (-0.018326 -0.06399095 -0.05367599)
      PathWrap: wrap_object=wrap_glutmax_L method=hybrid
    Millard2012EquilibriumMuscle glut_max_L3: min_control=0.01 max_control=1
      PathPoint P1: pelvis (-0.13761 0.05182201 -0.05689)
      PathPoint P2: femur_l (-0.018326 -0.06399095 -0.05367599)
      PathWrap: wrap_object=wrap_glutmax_L method=hybrid
    Millard2012EquilibriumMuscle glut_max_L4: min_control=0.01 max_control=1
      PathPoint P1: pelvis (-0.144125 0.03810501 -0.053641)
      PathPoint P2: femur_l (-0.018326 -0.06399095 -0.05367599)
      PathWrap: wrap_object=wrap_glutmax_L method=hybrid
    Millard2012EquilibriumMuscle glut_max_L5: min_control=0.01 max_control=1
      PathPoint P1: pelvis (-0.152234 0.02071798 -0.046875)
      PathPoint P2: femur_l (-0.018326 -0.06399095 -0.05367599)
      PathWrap: wrap_object=wrap_glutmax_L method=hybrid
    Millard2012EquilibriumMuscle glut_max_L6: min_control=0.01 max_control=1
      PathPoint P1: pelvis (-0.162955 0.004778028 -0.037967)
      PathPoint P2: femur_l (-0.018326 -0.06399095 -0.05367599)
      PathWrap: wrap_object=wrap_glutmax_L method=hybrid
    Millard2012EquilibriumMuscle glut_max_L7: min_control=0.01 max_control=1
      PathPoint P1: pelvis (-0.169776 -0.01080602 -0.028621)
      PathPoint P2: femur_l (-0.018326 -0.06399095 -0.05367599)
      PathWrap: wrap_object=wrap_glutmax_L method=hybrid
    Millard2012EquilibriumMuscle glut_med_R1: min_control=0.01 max_control=1
      PathPoint P1: pelvis (-0.06235185 0.07562584 0.1067206)
      PathPoint P2: femur_r (-0.02096903 -0.01837617 0.05783226)
      PathWrap: wrap_object=wrap_glutmed_R method=hybrid
    Millard2012EquilibriumMuscle glut_med_R2: min_control=0.01 max_control=1
      PathPoint P1: pelvis (-0.07548246 0.07958382 0.09380755)
      PathPoint P2: femur_r (-0.02096903 -0.01837617 0.05783226)
      PathWrap: wrap_object=wrap_glutmed_R method=hybrid
    Millard2012EquilibriumMuscle glut_med_R3: min_control=0.01 max_control=1
      PathPoint P1: pelvis (-0.0894222 0.07869667 0.08265114)
      PathPoint P2: femur_r (-0.02096903 -0.01837617 0.05783226)
      PathWrap: wrap_object=wrap_glutmed_R method=hybrid
    Millard2012EquilibriumMuscle glut_med_R4: min_control=0.01 max_control=1
      PathPoint P1: pelvis (-0.1012582 0.07113403 0.07161421)
      PathPoint P2: femur_r (-0.02096903 -0.01837617 0.05783226)
      PathWrap: wrap_object=wrap_glutmed_R method=hybrid
    Millard2012EquilibriumMuscle glut_med_R5: min_control=0.01 max_control=1
      PathPoint P1: pelvis (-0.1164174 0.06047541 0.06996071)
      PathPoint P2: femur_r (-0.02096903 -0.01837617 0.05783226)
      PathWrap: wrap_object=wrap_glutmed_R method=hybrid
    Millard2012EquilibriumMuscle glut_med_L1: min_control=0.01 max_control=1
      PathPoint P1: pelvis (-0.062352 0.07562596 -0.106721)
      PathPoint P2: femur_l (-0.020969 -0.01837599 -0.057832)
      PathWrap: wrap_object=wrap_glutmed_L method=hybrid
    Millard2012EquilibriumMuscle glut_med_L2: min_control=0.01 max_control=1
      PathPoint P1: pelvis (-0.075482 0.07958394 -0.093808)
      PathPoint P2: femur_l (-0.020969 -0.01837599 -0.057832)
      PathWrap: wrap_object=wrap_glutmed_L method=hybrid
    Millard2012EquilibriumMuscle glut_med_L3: min_control=0.01 max_control=1
      PathPoint P1: pelvis (-0.089422 0.07869703 -0.082651)
      PathPoint P2: femur_l (-0.020969 -0.01837599 -0.057832)
      PathWrap: wrap_object=wrap_glutmed_L method=hybrid
    Millard2012EquilibriumMuscle glut_med_L4: min_control=0.01 max_control=1
      PathPoint P1: pelvis (-0.101258 0.07113403 -0.071614)
      PathPoint P2: femur_l (-0.020969 -0.01837599 -0.057832)
      PathWrap: wrap_object=wrap_glutmed_L method=hybrid
    Millard2012EquilibriumMuscle glut_med_L5: min_control=0.01 max_control=1
      PathPoint P1: pelvis (-0.116417 0.06047505 -0.069961)
      PathPoint P2: femur_l (-0.020969 -0.01837599 -0.057832)
      PathWrap: wrap_object=wrap_glutmed_L method=hybrid
    Millard2012EquilibriumMuscle pec_major_L1: min_control=0.01 max_control=1
      PathPoint pec_major_L-P1: torso (0.03048552 0.3607763 -0.02254809)
      PathPoint pec_major_L-P2: humerus_l (0.01113787 -0.0761162 -0.005645588)
      PathWrap: wrap_object=wrap_pec_L method=hybrid
    Millard2012EquilibriumMuscle pec_major_L2: min_control=0.01 max_control=1
      PathPoint P1: torso (0.03837556 0.3493865 -0.01073811)
      PathPoint P2: humerus_l (0.01113787 -0.0761162 -0.005645588)
      PathWrap: wrap_object=wrap_pec_L method=hybrid
    Millard2012EquilibriumMuscle pec_major_L3: min_control=0.01 max_control=1
      PathPoint P1: torso (0.04867388 0.3315072 -0.009757)
      PathPoint P2: humerus_l (0.01113787 -0.0761162 -0.005645588)
      PathWrap: wrap_object=wrap_pec_L method=hybrid
    Millard2012EquilibriumMuscle pec_major_L4: min_control=0.01 max_control=1
      PathPoint P1: torso (0.05664385 0.3164998 -0.01041299)
      PathPoint P2: humerus_l (0.01113787 -0.0761162 -0.005645588)
      PathWrap: wrap_object=wrap_pec_L method=hybrid
    Millard2012EquilibriumMuscle pec_major_L5: min_control=0.01 max_control=1
      PathPoint P1: torso (0.06426067 0.2976481 -0.009732796)
      PathPoint P2: humerus_l (0.01113787 -0.0761162 -0.005645588)
      PathWrap: wrap_object=wrap_pec_L method=hybrid
    Millard2012EquilibriumMuscle pec_major_L6: min_control=0.01 max_control=1
      PathPoint P1: torso (0.07139648 0.2776462 -0.009769671)
      PathPoint P2: humerus_l (0.01113787 -0.0761162 -0.005645588)
      PathWrap: wrap_object=wrap_pec_L method=hybrid
    Millard2012EquilibriumMuscle pec_major_L7: min_control=0.01 max_control=1
      PathPoint P1: torso (0.07695151 0.2610499 -0.01362323)
      PathPoint P2: humerus_l (0.01113787 -0.0761162 -0.005645588)
      PathWrap: wrap_object=wrap_pec_L method=hybrid
    Millard2012EquilibriumMuscle pec_major_L8: min_control=0.01 max_control=1
      PathPoint P1: torso (0.08139501 0.2402676 -0.01649451)
      PathPoint P2: humerus_l (0.01113787 -0.0761162 -0.005645588)
      PathWrap: wrap_object=wrap_pec_L method=hybrid
    Millard2012EquilibriumMuscle pec_major_R1: min_control=0.01 max_control=1
      PathPoint P1: torso (0.030486 0.3607761 0.022548)
      PathPoint P2: humerus_r (0.011138 -0.07611597 0.005646005)
      PathWrap: wrap_object=wrap_pec_R method=hybrid
    Millard2012EquilibriumMuscle pec_major_R2: min_control=0.01 max_control=1
      PathPoint P1: torso (0.038376 0.349386 0.010738)
      PathPoint P2: humerus_r (0.011138 -0.07611597 0.005646005)
      PathWrap: wrap_object=wrap_pec_R method=hybrid
    Millard2012EquilibriumMuscle pec_major_R3: min_control=0.01 max_control=1
      PathPoint P1: torso (0.048674 0.331507 0.009757)
      PathPoint P2: humerus_r (0.011138 -0.07611597 0.005646005)
      PathWrap: wrap_object=wrap_pec_R method=hybrid
    Millard2012EquilibriumMuscle pec_major_R4: min_control=0.01 max_control=1
      PathPoint P1: torso (0.056644 0.3165001 0.010413)
      PathPoint P2: humerus_r (0.011138 -0.07611597 0.005646005)
      PathWrap: wrap_object=wrap_pec_R method=hybrid
    Millard2012EquilibriumMuscle pec_major_R5: min_control=0.01 max_control=1
      PathPoint P1: torso (0.064261 0.297648 0.009733)
      PathPoint P2: humerus_r (0.011138 -0.07611597 0.005646005)
      PathWrap: wrap_object=wrap_pec_R method=hybrid
    Millard2012EquilibriumMuscle pec_major_R6: min_control=0.01 max_control=1
      PathPoint P1: torso (0.071396 0.2776461 0.00977)
      PathPoint P2: humerus_r (0.011138 -0.07611597 0.005646005)
      PathWrap: wrap_object=wrap_pec_R method=hybrid
    Millard2012EquilibriumMuscle pec_major_R7: min_control=0.01 max_control=1
      PathPoint P1: torso (0.076952 0.26105 0.013623)
      PathPoint P2: humerus_r (0.011138 -0.07611597 0.005646005)
      PathWrap: wrap_object=wrap_pec_R method=hybrid
    Millard2012EquilibriumMuscle pec_major_R8: min_control=0.01 max_control=1
      PathPoint P1: torso (0.081395 0.240268 0.016495)
      PathPoint P2: humerus_r (0.011138 -0.07611597 0.005646005)
      PathWrap: wrap_object=wrap_pec_R method=hybrid
    Millard2012EquilibriumMuscle lat_R1: min_control=0.01 max_control=1
      PathPoint P1: torso (-0.08679577 0.2236443 -6.535184e-5)
      PathPoint P2: humerus_r (-0.02240824 -0.06606162 -0.02316274)
      PathPoint P3: humerus_r (0.01816091 -0.03119791 -0.002993479)
      PathWrap: wrap_object=wrap_lat_R method=hybrid
    Millard2012EquilibriumMuscle lat_R2: min_control=0.01 max_control=1
      PathPoint P1: torso (-0.08414807 0.2032689 2.367236e-5)
      PathPoint P2: humerus_r (-0.02240824 -0.06606162 -0.02316274)
      PathPoint P3: humerus_r (0.01816091 -0.03119791 -0.002993479)
      PathWrap: wrap_object=wrap_lat_R method=hybrid
    Millard2012EquilibriumMuscle lat_R3: min_control=0.01 max_control=1
      PathPoint P1: torso (-0.0750265 0.1671624 9.053852e-5)
      PathPoint P2: humerus_r (-0.02240824 -0.06606162 -0.02316274)
      PathPoint P3: humerus_r (0.01816091 -0.03119791 -0.002993479)
      PathWrap: wrap_object=wrap_lat_R method=hybrid
    Millard2012EquilibriumMuscle lat_R4: min_control=0.01 max_control=1
      PathPoint P1: torso (-0.06919726 0.1407175 -0.0001751999)
      PathPoint P2: humerus_r (-0.02240824 -0.06606162 -0.02316274)
      PathPoint P3: humerus_r (0.01816091 -0.03119791 -0.002993479)
      PathWrap: wrap_object=wrap_lat_R method=hybrid
    Millard2012EquilibriumMuscle lat_R5: min_control=0.01 max_control=1
      PathPoint P1: torso (-0.05880233 0.1136775 -0.000118108)
      PathPoint P2: humerus_r (-0.02240824 -0.06606162 -0.02316274)
      PathPoint P3: humerus_r (0.01816091 -0.03119791 -0.002993479)
      PathWrap: wrap_object=wrap_lat_R method=hybrid
    Millard2012EquilibriumMuscle lat_R6: min_control=0.01 max_control=1
      PathPoint P1: torso (-0.04700857 0.09124982 0.0001995009)
      PathPoint P2: humerus_r (-0.02240824 -0.06606162 -0.02316274)
      PathPoint P3: humerus_r (0.01816091 -0.03119791 -0.002993479)
      PathWrap: wrap_object=wrap_lat_R method=hybrid
    Millard2012EquilibriumMuscle lat_R7: min_control=0.01 max_control=1
      PathPoint P1: torso (-0.03643941 0.06386185 0.0002626898)
      PathPoint P2: humerus_r (-0.02240824 -0.06606162 -0.02316274)
      PathPoint P3: humerus_r (0.01816091 -0.03119791 -0.002993479)
      PathWrap: wrap_object=wrap_lat_R method=hybrid
    Millard2012EquilibriumMuscle lat_R8: min_control=0.01 max_control=1
      PathPoint P1: torso (-0.0350688 0.04224539 -0.0002371031)
      PathPoint P2: humerus_r (-0.02240824 -0.06606162 -0.02316274)
      PathPoint P3: humerus_r (0.01816091 -0.03119791 -0.002993479)
      PathWrap: wrap_object=wrap_lat_R method=hybrid
    Millard2012EquilibriumMuscle lat_R9: min_control=0.01 max_control=1
      PathPoint P1: torso (-0.03517639 0.02222514 -0.0001053284)
      PathPoint P2: humerus_r (-0.02240824 -0.06606162 -0.02316274)
      PathPoint P3: humerus_r (0.01816091 -0.03119791 -0.002993479)
      PathWrap: wrap_object=wrap_lat_R method=hybrid
    Millard2012EquilibriumMuscle lat_R10: min_control=0.01 max_control=1
      PathPoint P1: torso (-0.03436723 0.008411646 0.0002797488)
      PathPoint P2: humerus_r (-0.02240824 -0.06606162 -0.02316274)
      PathPoint P3: humerus_r (0.01816091 -0.03119791 -0.002993479)
      PathWrap: wrap_object=wrap_lat_R method=hybrid
    Millard2012EquilibriumMuscle lat_L1: min_control=0.01 max_control=1
      PathPoint P1: torso (-0.08679577 0.2236443 -6.535184e-5)
      PathPoint P2: humerus_l (-0.022408 -0.06606197 0.02316301)
      PathPoint P3: humerus_l (0.018161 -0.03119802 0.002993003)
      PathWrap: wrap_object=wrap_lat_L method=hybrid
    Millard2012EquilibriumMuscle lat_L2: min_control=0.01 max_control=1
      PathPoint P1: torso (-0.08414807 0.2032689 2.367236e-5)
      PathPoint P2: humerus_l (-0.022408 -0.06606197 0.02316301)
      PathPoint P3: humerus_l (0.018161 -0.03119802 0.002993003)
      PathWrap: wrap_object=wrap_lat_L method=hybrid
    Millard2012EquilibriumMuscle lat_L3: min_control=0.01 max_control=1
      PathPoint P1: torso (-0.0750265 0.1671624 9.053852e-5)
      PathPoint P2: humerus_l (-0.022408 -0.06606197 0.02316301)
      PathPoint P3: humerus_l (0.018161 -0.03119802 0.002993003)
      PathWrap: wrap_object=wrap_lat_L method=hybrid
    Millard2012EquilibriumMuscle lat_L4: min_control=0.01 max_control=1
      PathPoint P1: torso (-0.06919726 0.1407175 -0.0001751999)
      PathPoint P2: humerus_l (-0.022408 -0.06606197 0.02316301)
      PathPoint P3: humerus_l (0.018161 -0.03119802 0.002993003)
      PathWrap: wrap_object=wrap_lat_L method=hybrid
    Millard2012EquilibriumMuscle lat_L5: min_control=0.01 max_control=1
      PathPoint P1: torso (-0.05880233 0.1136775 -0.000118108)
      PathPoint P2: humerus_l (-0.022408 -0.06606197 0.02316301)
      PathPoint P3: humerus_l (0.018161 -0.03119802 0.002993003)
      PathWrap: wrap_object=wrap_lat_L method=hybrid
    Millard2012EquilibriumMuscle lat_L6: min_control=0.01 max_control=1
      PathPoint P1: torso (-0.04700857 0.09124982 0.0001995009)
      PathPoint P2: humerus_l (-0.022408 -0.06606197 0.02316301)
      PathPoint P3: humerus_l (0.018161 -0.03119802 0.002993003)
      PathWrap: wrap_object=wrap_lat_L method=hybrid
    Millard2012EquilibriumMuscle lat_L7: min_control=0.01 max_control=1
      PathPoint P1: torso (-0.03643941 0.06386185 0.0002626898)
      PathPoint P2: humerus_l (-0.022408 -0.06606197 0.02316301)
      PathPoint P3: humerus_l (0.018161 -0.03119802 0.002993003)
      PathWrap: wrap_object=wrap_lat_L method=hybrid
    Millard2012EquilibriumMuscle lat_L8: min_control=0.01 max_control=1
      PathPoint P1: torso (-0.0350688 0.04224539 -0.0002371031)
      PathPoint P2: humerus_l (-0.022408 -0.06606197 0.02316301)
      PathPoint P3: humerus_l (0.018161 -0.03119802 0.002993003)
      PathWrap: wrap_object=wrap_lat_L method=hybrid
    Millard2012EquilibriumMuscle lat_L9: min_control=0.01 max_control=1
      PathPoint P1: torso (-0.03517639 0.02222514 -0.0001053284)
      PathPoint P2: humerus_l (-0.022408 -0.06606197 0.02316301)
      PathPoint P3: humerus_l (0.018161 -0.03119802 0.002993003)
      PathWrap: wrap_object=wrap_lat_L method=hybrid
    Millard2012EquilibriumMuscle lat_L10: min_control=0.01 max_control=1
      PathPoint P1: torso (-0.03436723 0.008411646 0.0002797488)
      PathPoint P2: humerus_l (-0.022408 -0.06606197 0.02316301)
      PathPoint P3: humerus_l (0.018161 -0.03119802 0.002993003)
      PathWrap: wrap_object=wrap_lat_L method=hybrid
    Millard2012EquilibriumMuscle ant_delt_L: min_control=0.01 max_control=1
      PathPoint P1: torso (0.004855968 0.3987643 -0.1090973)
      PathPoint P2: humerus_l (0.01449686 -0.05770659 0.001540422)
      PathWrap: wrap_object=wrap_delt_L method=hybrid
    Millard2012EquilibriumMuscle mid_delt_L: min_control=0.01 max_control=1
      PathPoint P1: torso (0.01144976 0.403592 -0.1561015)
      PathPoint P2: humerus_l (0.0112987 -0.06887496 -0.006179705)
      PathWrap: wrap_object=wrap_delt_L method=hybrid
    Millard2012EquilibriumMuscle post_delt_L: min_control=0.01 max_control=1
      PathPoint P1: torso (-0.04370954 0.3806287 -0.1403737)
      PathPoint P2: humerus_l (0.002488345 -0.05876195 -0.008088723)
      PathWrap: wrap_object=wrap_delt_L method=hybrid
    Millard2012EquilibriumMuscle ant_delt_R: min_control=0.01 max_control=1
      PathPoint P1: torso (0.004855998 0.398764 0.109097)
      PathPoint P2: humerus_r (0.014497 -0.05770695 -0.001540005)
      PathWrap: wrap_object=wrap_delt_R method=hybrid
    Millard2012EquilibriumMuscle mid_delt_R: min_control=0.01 max_control=1
      PathPoint P1: torso (0.01145 0.403592 0.156101)
      PathPoint P2: humerus_r (0.011299 -0.06887496 0.006180003)
      PathWrap: wrap_object=wrap_delt_R method=hybrid
    Millard2012EquilibriumMuscle post_delt_R: min_control=0.01 max_control=1
      PathPoint P1: torso (-0.04371 0.3806291 0.140374)
      PathPoint P2: humerus_r (0.002487995 -0.05876195 0.008088991)
      PathWrap: wrap_object=wrap_delt_R method=hybrid
    Millard2012EquilibriumMuscle ext_rot_R: min_control=0.01 max_control=1
      PathPoint P1: torso (-0.07290234 0.3186117 0.1024567)
      PathPoint P2: humerus_r (0.006787091 -0.001123905 0.0186913)
    Millard2012EquilibriumMuscle ext_rot_L: min_control=0.01 max_control=1
      PathPoint P1: torso (-0.072902 0.318612 -0.102457)
      PathPoint P2: humerus_l (0.006786995 -0.001124024 -0.018691)
    Millard2012EquilibriumMuscle subscap_R: min_control=0.01 max_control=1
      PathPoint P1: torso (-0.05150586 0.3400062 0.1088157)
      PathPoint P2: humerus_r (0.02830081 -0.003430843 -0.007428333)
    Millard2012EquilibriumMuscle subscap_L: min_control=0.01 max_control=1
      PathPoint P1: torso (-0.05150601 0.340006 -0.108816)
      PathPoint P2: humerus_l (0.028301 -0.003430963 0.007428005)
    Millard2012EquilibriumMuscle trap_R1: min_control=0.01 max_control=1
      PathPoint P1: torso (-0.04966005 0.4816059 0.0001045908)
      PathPoint P2: torso (-0.01340999 0.3956858 0.1647258)
      PathWrap: wrap_object=wrap_trap_R method=hybrid
    Millard2012EquilibriumMuscle trap_R2: min_control=0.01 max_control=1
      PathPoint P1: torso (-0.05217827 0.469383 -4.960923e-5)
      PathPoint P2: torso (-0.01340999 0.3956858 0.1647258)
      PathWrap: wrap_object=wrap_trap_R method=hybrid
    Millard2012EquilibriumMuscle trap_R3: min_control=0.01 max_control=1
      PathPoint P1: torso (-0.05507391 0.4602716 -0.0001439734)
      PathPoint P2: torso (-0.01340999 0.3956858 0.1647258)
      PathWrap: wrap_object=wrap_trap_R method=hybrid
    Millard2012EquilibriumMuscle trap_R4: min_control=0.01 max_control=1
      PathPoint P1: torso (-0.05787372 0.452152 -0.000131479)
      PathPoint P2: torso (-0.01340999 0.3956858 0.1647258)
      PathWrap: wrap_object=wrap_trap_R method=hybrid
    Millard2012EquilibriumMuscle trap_R5: min_control=0.01 max_control=1
      PathPoint P1: torso (-0.06025065 0.4371808 -0.0002769767)
      PathPoint P2: torso (-0.01340999 0.3956858 0.1647258)
      PathWrap: wrap_object=wrap_trap_R method=hybrid
    Millard2012EquilibriumMuscle trap_R6: min_control=0.01 max_control=1
      PathPoint P1: torso (-0.06349175 0.4122713 -1.431024e-5)
      PathPoint P2: torso (-0.01340999 0.3956858 0.1647258)
      PathWrap: wrap_object=wrap_trap_R method=hybrid
    Millard2012EquilibriumMuscle trap_R7: min_control=0.01 max_control=1
      PathPoint P1: torso (-0.06727315 0.3853896 0.0001932755)
      PathPoint P2: torso (-0.01340999 0.3956858 0.1647258)
      PathWrap: wrap_object=wrap_trap_R method=hybrid
    Millard2012EquilibriumMuscle trap_R8: min_control=0.01 max_control=1
      PathPoint P1: torso (-0.07422679 0.3654599 0.0007318002)
      PathPoint P2: torso (-0.01340999 0.3956858 0.1647258)
      PathWrap: wrap_object=wrap_trap_R method=hybrid
    Millard2012EquilibriumMuscle trap_R9: min_control=0.01 max_control=1
      PathPoint P1: torso (-0.08285444 0.3434073 0.0005639722)
      PathPoint P2: torso (-0.01340999 0.3956858 0.1647258)
      PathWrap: wrap_object=wrap_trap_R method=hybrid
    Millard2012EquilibriumMuscle trap_R10: min_control=0.01 max_control=1
      PathPoint P1: torso (-0.09009176 0.3192866 0.001271867)
      PathPoint P2: torso (-0.01340999 0.3956858 0.1647258)
      PathWrap: wrap_object=wrap_trap_R method=hybrid
    Millard2012EquilibriumMuscle trap_R11: min_control=0.01 max_control=1
      PathPoint P1: torso (-0.09265298 0.2970077 0.0004809489)
      PathPoint P2: torso (-0.01340999 0.3956858 0.1647258)
      PathWrap: wrap_object=wrap_trap_R method=hybrid
    Millard2012EquilibriumMuscle trap_R12: min_control=0.01 max_control=1
      PathPoint P1: torso (-0.09703656 0.2706509 0.0002833358)
      PathPoint P2: torso (-0.01340999 0.3956858 0.1647258)
      PathWrap: wrap_object=wrap_trap_R method=hybrid
    Millard2012EquilibriumMuscle trap_R13: min_control=0.01 max_control=1
      PathPoint P1: torso (-0.09407602 0.2435251 0.0002458622)
      PathPoint P2: torso (-0.01340999 0.3956858 0.1647258)
      PathWrap: wrap_object=wrap_trap_R method=hybrid
    Millard2012EquilibriumMuscle trap_L1: min_control=0.01 max_control=1
      PathPoint P1: torso (-0.04966005 0.4816059 0.0001045908)
      PathPoint P2: torso (-0.01341 0.395686 -0.164726)
      PathWrap: wrap_object=wrap_trap_L method=hybrid
    Millard2012EquilibriumMuscle trap_L2: min_control=0.01 max_control=1
      PathPoint P1: torso (-0.05217827 0.469383 -4.960923e-5)
      PathPoint P2: torso (-0.01341 0.395686 -0.164726)
      PathWrap: wrap_object=wrap_trap_L method=hybrid
    Millard2012EquilibriumMuscle trap_L3: min_control=0.01 max_control=1
      PathPoint P1: torso (-0.05507391 0.4602716 -0.0001439734)
      PathPoint P2: torso (-0.01341 0.395686 -0.164726)
      PathWrap: wrap_object=wrap_trap_L method=hybrid
    Millard2012EquilibriumMuscle trap_L4: min_control=0.01 max_control=1
      PathPoint P1: torso (-0.05787372 0.452152 -0.000131479)
      PathPoint P2: torso (-0.01341 0.395686 -0.164726)
      PathWrap: wrap_object=wrap_trap_L method=hybrid
    Millard2012EquilibriumMuscle trap_L5: min_control=0.01 max_control=1
      PathPoint P1: torso (-0.06025065 0.4371808 -0.0002769767)
      PathPoint P2: torso (-0.01341 0.395686 -0.164726)
      PathWrap: wrap_object=wrap_trap_L method=hybrid
    Millard2012EquilibriumMuscle trap_L6: min_control=0.01 max_control=1
      PathPoint P1: torso (-0.06349175 0.4122713 -1.431024e-5)
      PathPoint P2: torso (-0.01341 0.395686 -0.164726)
      PathWrap: wrap_object=wrap_trap_L method=hybrid
    Millard2012EquilibriumMuscle trap_L7: min_control=0.01 max_control=1
      PathPoint P1: torso (-0.06727315 0.3853896 0.0001932755)
      PathPoint P2: torso (-0.01341 0.395686 -0.164726)
      PathWrap: wrap_object=wrap_trap_L method=hybrid
    Millard2012EquilibriumMuscle trap_L8: min_control=0.01 max_control=1
      PathPoint P1: torso (-0.07422679 0.3654599 0.0007318002)
      PathPoint P2: torso (-0.01341 0.395686 -0.164726)
      PathWrap: wrap_object=wrap_trap_L method=hybrid
    Millard2012EquilibriumMuscle trap_L9: min_control=0.01 max_control=1
      PathPoint P1: torso (-0.08285444 0.3434073 0.0005639722)
      PathPoint P2: torso (-0.01341 0.395686 -0.164726)
      PathWrap: wrap_object=wrap_trap_L method=hybrid
    Millard2012EquilibriumMuscle trap_L10: min_control=0.01 max_control=1
      PathPoint P1: torso (-0.09009176 0.3192866 0.001271867)
      PathPoint P2: torso (-0.01341 0.395686 -0.164726)
      PathWrap: wrap_object=wrap_trap_L method=hybrid
    Millard2012EquilibriumMuscle trap_L11: min_control=0.01 max_control=1
      PathPoint P1: torso (-0.09265298 0.2970077 0.0004809489)
      PathPoint P2: torso (-0.01341 0.395686 -0.164726)
      PathWrap: wrap_object=wrap_trap_L method=hybrid
    Millard2012EquilibriumMuscle trap_L12: min_control=0.01 max_control=1
      PathPoint P1: torso (-0.09703656 0.2706509 0.0002833358)
      PathPoint P2: torso (-0.01341 0.395686 -0.164726)
      PathWrap: wrap_object=wrap_trap_L method=hybrid
    Millard2012EquilibriumMuscle trap_L13: min_control=0.01 max_control=1
      PathPoint P1: torso (-0.09407602 0.2435251 0.0002458622)
      PathPoint P2: torso (-0.01341 0.395686 -0.164726)
      PathWrap: wrap_object=wrap_trap_L method=hybrid
    Millard2012EquilibriumMuscle brachialis_R: min_control=0.01 max_control=1
      PathPoint P1: humerus_r (0.01181027 -0.1052853 -0.002274245)
      PathPoint P2: ulna_r (-0.005010083 -0.01695049 -0.0008737296)
    Millard2012EquilibriumMuscle brachialis_L: min_control=0.01 max_control=1
      PathPoint P1: humerus_l (0.01181 -0.105285 0.002274007)
      PathPoint P2: ulna_l (-0.005010001 -0.01695001 0.0008739978)
    Millard2012EquilibriumMuscle triceps_long_L: min_control=0.01 max_control=1
      PathPoint P1: torso (-0.009663999 0.34311 -0.144925)
      PathPoint P2: ulna_l (-0.03197201 0.002305984 -0.001490012)
    Millard2012EquilibriumMuscle triceps_med_L: min_control=0.01 max_control=1
      PathPoint P1: humerus_l (-0.0003840029 -0.127532 0.005299002)
      PathPoint P2: ulna_l (-0.03197201 0.002305984 -0.001490012)
    Millard2012EquilibriumMuscle triceps_lat_L: min_control=0.01 max_control=1
      PathPoint P1: humerus_l (-0.001093 -0.03696096 -0.003787994)
      PathPoint P2: ulna_l (-0.03197201 0.002305984 -0.001490012)
    Millard2012EquilibriumMuscle triceps_long_R: min_control=0.01 max_control=1
      PathPoint P1: torso (-0.009663902 0.3431098 0.1449253)
      PathPoint P2: ulna_r (-0.03197156 0.002305865 0.001489967)
    Millard2012EquilibriumMuscle triceps_med_R: min_control=0.01 max_control=1
      PathPoint P1: humerus_r (-0.0003842115 -0.1275319 -0.0052986)
      PathPoint P2: ulna_r (-0.03197156 0.002305865 0.001489967)
    Millard2012EquilibriumMuscle triceps_lat_R: min_control=0.01 max_control=1
      PathPoint P1: humerus_r (-0.001093239 -0.03696096 0.003787979)
      PathPoint P2: ulna_r (-0.03197156 0.002305865 0.001489967)
    Millard2012EquilibriumMuscle biceps_brach_long_R: min_control=0.01 max_control=1
      PathPoint Millard2012EquilibriumMuscle-P1: torso (0.004595608 0.3815609 0.134519)
      PathPoint Millard2012EquilibriumMuscle-P2: humerus_r (0.022418 0.007105947 0.001442)
      PathPoint Millard2012EquilibriumMuscle-P3: radius_r (0.004058279 -0.0281297 -0.00233525)
    Millard2012EquilibriumMuscle biceps_brach_short_R: min_control=0.01 max_control=1
      PathPoint P1: torso (0.03084827 0.3840237 0.1271704)
      PathPoint P2: radius_r (0.004058279 -0.0281297 -0.00233525)
    Millard2012EquilibriumMuscle biceps_brach_long_L: min_control=0.01 max_control=1
      PathPoint P1: torso (0.004595995 0.381561 -0.134519)
      PathPoint P2: humerus_l (0.02241841 0.007106423 -0.001441911)
      PathPoint P3: radius_l (0.004057996 -0.02812994 0.002334997)
    Millard2012EquilibriumMuscle biceps_brach_short_L: min_control=0.01 max_control=1
      PathPoint P1: torso (0.030848 0.384024 -0.12717)
      PathPoint P2: radius_l (0.004057996 -0.02812994 0.002334997)
    Millard2012EquilibriumMuscle brachiorad_R: min_control=0.01 max_control=1
      PathPoint P1: humerus_r (0.004945248 -0.2369088 0.006220356)
      PathPoint P2: radius_r (0.004191853 -0.2245128 0.03086337)
    Millard2012EquilibriumMuscle brachiorad_L: min_control=0.01 max_control=1
      PathPoint P1: humerus_l (0.004944995 -0.236909 -0.006219998)
      PathPoint P2: radius_l (0.004192002 -0.2245129 -0.030863)
    Millard2012EquilibriumMuscle flex_polli_L: min_control=0.01 max_control=1
      PathPoint P1: radius_l (-0.002456002 -0.06408393 -0.004162997)
      PathPoint P2: hand_l (0.0002389997 -0.01886499 -0.01764901)
      PathPoint P3: hand_l (0.01730099 -0.04697901 -0.04138601)
      PathPoint P4: hand_l (0.02271 -0.08105099 -0.041372)
    Millard2012EquilibriumMuscle flex_polli_R: min_control=0.01 max_control=1
      PathPoint P1: radius_r (-0.00245633 -0.0640837 0.004162565)
      PathPoint P2: hand_r (0.0002389699 -0.01886499 0.01764883)
      PathPoint P3: hand_r (0.01730146 -0.04697853 0.04138602)
      PathPoint P4: hand_r (0.02271013 -0.08105141 0.04137215)
    Millard2012EquilibriumMuscle flex_ulnar_R: min_control=0.01 max_control=1
      PathPoint P1: ulna_r (-0.0226455 -0.002997875 -0.009148017)
      PathPoint P2: hand_r (0.00910078 -0.02248287 -0.01266415)
    Millard2012EquilibriumMuscle flex_ulnar_L: min_control=0.01 max_control=1
      PathPoint P1: ulna_l (-0.022645 -0.002997994 0.009148002)
      PathPoint P2: hand_l (0.009100996 -0.02248299 0.01266399)
    Millard2012EquilibriumMuscle flex_radi_R: min_control=0.01 max_control=1
      PathPoint P1: humerus_r (0.01080343 -0.2847532 -0.02461785)
      PathPoint P2: hand_r (0.0002253503 -0.03005815 0.01169555)
    Millard2012EquilibriumMuscle flex_radi_L: min_control=0.01 max_control=1
      PathPoint P1: humerus_l (0.010803 -0.284753 0.024618)
      PathPoint P2: hand_l (0.0002250001 -0.03005797 -0.01169601)
    Millard2012EquilibriumMuscle ext_radi_R: min_control=0.01 max_control=1
      PathPoint P1: humerus_r (0.001457542 -0.2770792 0.01677184)
      PathPoint P2: hand_r (-0.00869076 -0.03327662 0.01310001)
    Millard2012EquilibriumMuscle ext_ulna_R: min_control=0.01 max_control=1
      PathPoint P1: humerus_r (0.00337413 -0.284271 0.008887872)
      PathPoint P2: hand_r (-0.006245956 -0.02875847 -0.02115686)
    Millard2012EquilibriumMuscle ext_radi_L: min_control=0.01 max_control=1
      PathPoint P1: humerus_l (0.001457997 -0.277079 -0.016772)
      PathPoint P2: hand_l (-0.008691005 -0.03327698 -0.01310001)
    Millard2012EquilibriumMuscle ext_ulna_L: min_control=0.01 max_control=1
      PathPoint P1: humerus_l (0.003373995 -0.284271 -0.008887991)
      PathPoint P2: hand_l (-0.006246001 -0.02875799 0.021157)
    Millard2012EquilibriumMuscle ext_polli_R: min_control=0.01 max_control=1
      PathPoint P1: ulna_r (-0.03132997 -0.1392667 0.01372711)
      PathPoint P2: hand_r (-0.005967036 -0.001388788 0.001984805)
      PathPoint P3: hand_r (-0.002383426 -0.0225963 0.02936779)
      PathPoint P4: hand_r (0.01181699 -0.05559576 0.04679365)
      PathPoint P5: hand_r (0.02022858 -0.08080095 0.04570034)
    Millard2012EquilibriumMuscle ext_polli_L: min_control=0.01 max_control=1
      PathPoint P1: ulna_l (-0.03133 -0.139267 -0.01372701)
      PathPoint P2: hand_l (-0.005967006 -0.001388967 -0.001985013)
      PathPoint P3: hand_l (-0.002383001 -0.022596 -0.02936801)
      PathPoint P4: hand_l (0.01181699 -0.05559599 -0.04679401)
      PathPoint P5: hand_l (0.020229 -0.08080101 -0.04570001)
    Millard2012EquilibriumMuscle pec_major_L0: min_control=0.01 max_control=1
      PathPoint P1: torso (0.02437643 0.3864737 -0.03782112)
      PathPoint P2: humerus_l (0.01113787 -0.0761162 -0.005645588)
      PathWrap: wrap_object=wrap_pec_L method=hybrid
    Millard2012EquilibriumMuscle pec_major_R0: min_control=0.01 max_control=1
      PathPoint P1: torso (0.024376 0.386474 0.037821)
      PathPoint P2: humerus_r (0.011138 -0.07611597 0.005646005)
      PathWrap: wrap_object=wrap_pec_R method=hybrid
